*Heading
** Job name: curvedsurface Model name: Model-1
** Generated by: Abaqus/CAE 2020
*Preprint, echo=NO, model=NO, history=NO, contact=NO
**
** PARTS
**
*Part, name=Part-1
*Node
      1,           0.,          21.,          0.5
      2,    3.4000001,          21.,          0.5
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*Element, type=C3D8H
 1,  339, 1853, 4265, 1849,    1,  322, 1841,  329
 2, 1853, 1854, 4266, 4265,  322,  323, 1842, 1841
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*Nset, nset=Set-5
  185,  186,  189,  291,  292,  293
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*Elset, elset=Set-5, generate
 3857,  3924,     1
*Nset, nset=Set-6
  189,  195,  197,  293,  296,  297
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*Elset, elset=Set-6, generate
 3925,  4000,     1
*Nset, nset=Set-7
  191,  193,  195,  197,  294,  295
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*Elset, elset=Set-7, generate
 3543,  3596,     1
*Nset, nset=Set-8
  121,  189,  191,  195,  259,  293
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*Elset, elset=Set-8, generate
 3525,  3542,     1
*Nset, nset=Set-9
  121,  122,  186,  189,  259,  260
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*Elset, elset=Set-9, generate
 3411,  3428,     1
*Nset, nset=Set-10
  122,  183,  185,  186,  260,  290
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*Elset, elset=Set-10, generate
 3357,  3410,     1
*Nset, nset=Set-11
   74,  119,  122,  181,  183,  236
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*Elset, elset=Set-11, generate
 3285,  3356,     1
*Nset, nset=Set-12
   73,   74,  121,  122,  235,  236
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*Elset, elset=Set-12, generate
 2621,  2644,     1
*Nset, nset=Set-13
   73,  121,  125,  191,  235,  259
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*Elset, elset=Set-13, generate
 3429,  3452,     1
*Nset, nset=Set-14
  125,  127,  130,  191,  193,  261
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*Elset, elset=Set-14, generate
 3453,  3524,     1
*Nset, nset=Set-15
   79,   82,  127,  129,  130,  238
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*Elset, elset=Set-15, generate
 2693,  2740,     1
*Nset, nset=Set-16
   77,   79,  125,  127,  237,  238
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*Elset, elset=Set-16, generate
 2669,  2692,     1
*Nset, nset=Set-17
   35,   73,   77,  125,  216,  235
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*Elset, elset=Set-17, generate
 2645,  2668,     1
*Nset, nset=Set-18
   35,   36,   73,   74,  216,  217
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*Elset, elset=Set-18, generate
 2243,  2266,     1
*Nset, nset=Set-19
   36,   71,   74,  119,  217,  234
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*Elset, elset=Set-19, generate
 2597,  2620,     1
*Nset, nset=Set-20
   71,  116,  119,  179,  181,  234
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*Elset, elset=Set-20, generate
 3237,  3284,     1
*Nset, nset=Set-21
  115,  116,  177,  179,  256,  257
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*Elset, elset=Set-21, generate
 3219,  3236,     1
*Nset, nset=Set-22
   69,   71,  115,  116,  233,  234
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*Elset, elset=Set-22, generate
 2579,  2596,     1
*Nset, nset=Set-23
   31,   36,   69,   71,  214,  217
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*Elset, elset=Set-23, generate
 2225,  2242,     1
*Nset, nset=Set-24
   31,   32,   35,   36,  214,  215
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*Elset, elset=Set-24, generate
 1961,  1978,     1
*Nset, nset=Set-25
   32,   35,   39,   77,  215,  216
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*Elset, elset=Set-25, generate
 2267,  2284,     1
*Nset, nset=Set-26
   39,   42,   77,   79,  218,  220
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*Elset, elset=Set-26, generate
 2285,  2302,     1
*Nset, nset=Set-27
   42,   79,   81,   82,  220,  238
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*Elset, elset=Set-27, generate
 2303,  2320,     1
*Nset, nset=Set-28
   81,   82,  129,  133,  239,  240
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*Elset, elset=Set-28, generate
 2741,  2758,     1
*Nset, nset=Set-29
   81,   85,  133,  135,  239,  241
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*Elset, elset=Set-29, generate
 2759,  2776,     1
*Nset, nset=Set-30
   41,   42,   81,   85,  219,  220
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*Elset, elset=Set-30, generate
 2321,  2338,     1
*Nset, nset=Set-31
    2,   39,   41,   42,  200,  218
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*Elset, elset=Set-31, generate
 1997,  2014,     1
*Nset, nset=Set-32
    1,    2,   32,   39,  199,  200
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*Elset, elset=Set-32, generate
 1979,  1996,     1
*Nset, nset=Set-33
    1,   29,   31,   32,  199,  213
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*Elset, elset=Set-33, generate
 1943,  1960,     1
*Nset, nset=Set-34
   29,   31,   67,   69,  213,  214
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*Elset, elset=Set-34, generate
 2207,  2224,     1
*Nset, nset=Set-35
   67,   69,  113,  115,  232,  233
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*Elset, elset=Set-35, generate
 3615,  3632,     1
*Nset, nset=Set-36
  113,  115,  175,  177,  255,  256
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*Elset, elset=Set-36, generate
 3201,  3218,     1
*Nset, nset=Set-37
  111,  113,  173,  175,  254,  255
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*Elset, elset=Set-37, generate
 3183,  3200,     1
*Nset, nset=Set-38
   65,   67,  111,  113,  231,  232
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*Elset, elset=Set-38, generate
 2561,  2578,     1
*Nset, nset=Set-39
   27,   29,   65,   67,  212,  213
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*Elset, elset=Set-39, generate
 2189,  2206,     1
*Nset, nset=Set-40
    1,    4,   27,   29,  199,  202
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*Elset, elset=Set-40, generate
 1925,  1942,     1
*Nset, nset=Set-41
    1,    2,    3,    4,  199,  200
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*Elset, elset=Set-41, generate
 1799,  1816,     1
*Nset, nset=Set-42
    2,    3,   41,   45,  200,  201
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*Elset, elset=Set-42, generate
 2015,  2032,     1
*Nset, nset=Set-43
   41,   45,   85,   87,  219,  221
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*Elset, elset=Set-43, generate
 2339,  2356,     1
*Nset, nset=Set-44
   85,   87,  135,  137,  241,  242
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*Elset, elset=Set-44, generate
 2777,  2794,     1
*Nset, nset=Set-45
   87,   89,  137,  139,  242,  243
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*Elset, elset=Set-45, generate
 2795,  2812,     1
*Nset, nset=Set-46
   45,   47,   87,   89,  221,  222
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*Elset, elset=Set-46, generate
 2357,  2374,     1
*Nset, nset=Set-47
    3,   10,   45,   47,  201,  204
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*Elset, elset=Set-47, generate
 2033,  2050,     1
*Nset, nset=Set-48
    3,    4,    9,   10,  201,  202
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*Elset, elset=Set-48, generate
 1817,  1834,     1
*Nset, nset=Set-49
    4,    9,   25,   27,  202,  203
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*Elset, elset=Set-49, generate
 1907,  1924,     1
*Nset, nset=Set-50
   25,   27,   63,   65,  211,  212
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*Elset, elset=Set-50, generate
 2171,  2188,     1
*Nset, nset=Set-51
   63,   65,  109,  111,  230,  231
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*Elset, elset=Set-51, generate
 2543,  2560,     1
*Nset, nset=Set-52
  109,  111,  171,  173,  253,  254
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*Elset, elset=Set-52, generate
 3165,  3182,     1
*Nset, nset=Set-53
  105,  109,  169,  171,  251,  253
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*Elset, elset=Set-53, generate
 3147,  3164,     1
*Nset, nset=Set-54
   60,   63,  105,  109,  229,  230
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*Elset, elset=Set-54, generate
 2525,  2542,     1
*Nset, nset=Set-55
   22,   25,   60,   63,  210,  211
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*Elset, elset=Set-55, generate
 2153,  2170,     1
*Nset, nset=Set-56
    9,   14,   22,   25,  203,  206
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*Elset, elset=Set-56, generate
 1889,  1906,     1
*Nset, nset=Set-57
    9,   10,   13,   14,  203,  204
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*Elset, elset=Set-57, generate
 1835,  1852,     1
*Nset, nset=Set-58
   10,   13,   47,   49,  204,  205
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*Elset, elset=Set-58, generate
 2051,  2068,     1
*Nset, nset=Set-59
   47,   49,   89,   91,  222,  223
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*Elset, elset=Set-59, generate
 2375,  2392,     1
*Nset, nset=Set-60
   89,   91,  139,  141,  243,  244
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*Elset, elset=Set-60, generate
 2813,  2830,     1
*Nset, nset=Set-61
   91,   93,  141,  143,  244,  245
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*Elset, elset=Set-61, generate
 2831,  2848,     1
*Nset, nset=Set-62
   49,   51,   91,   93,  223,  224
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*Elset, elset=Set-62, generate
 2393,  2410,     1
*Nset, nset=Set-63
   13,   18,   49,   51,  205,  208
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*Elset, elset=Set-63, generate
 2069,  2086,     1
*Nset, nset=Set-64
   13,   14,   17,   18,  205,  206
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*Elset, elset=Set-64, generate
 1853,  1870,     1
*Nset, nset=Set-65
   14,   17,   21,   22,  206,  207
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*Elset, elset=Set-65, generate
 1871,  1888,     1
*Nset, nset=Set-66
   59,   60,  105,  106,  228,  229
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*Elset, elset=Set-66, generate
 2507,  2524,     1
*Nset, nset=Set-67
   21,   22,   59,   60,  209,  210
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*Elset, elset=Set-67, generate
 2135,  2152,     1
*Nset, nset=Set-68
  105,  106,  167,  169,  251,  252
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*Elset, elset=Set-68, generate
 3129,  3146,     1
*Nset, nset=Set-69
   59,  103,  106,  165,  167,  228
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*Elset, elset=Set-69, generate
 3081,  3128,     1
*Nset, nset=Set-70
   21,   57,   59,  103,  209,  227
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*Elset, elset=Set-70, generate
 2483,  2506,     1
*Nset, nset=Set-71
   17,   18,   53,   54,  207,  208
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*Elset, elset=Set-71, generate
 2087,  2110,     1
*Nset, nset=Set-72
   17,   21,   54,   57,  207,  209
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*Elset, elset=Set-72, generate
 2111,  2134,     1
*Nset, nset=Set-73
   18,   51,   53,   95,  208,  224
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*Elset, elset=Set-73, generate
 2411,  2434,     1
*Nset, nset=Set-74
   51,   93,   95,  143,  145,  224
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*Elset, elset=Set-74, generate
 2849,  2896,     1
*Nset, nset=Set-75
   95,  145,  147,  246,  271,  272
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*Elset, elset=Set-75, generate
 2897,  2926,     1
*Nset, nset=Set-76
   53,   95,   98,  147,  149,  225
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*Elset, elset=Set-76, generate
 2927,  2952,     1
*Nset, nset=Set-77
   53,   54,   97,   98,  225,  226
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*Elset, elset=Set-77, generate
 2435,  2458,     1
*Nset, nset=Set-78
   54,   57,   97,  101,  226,  227
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*Elset, elset=Set-78, generate
 2459,  2482,     1
*Nset, nset=Set-79
  103,  163,  165,  250,  280,  281
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*Elset, elset=Set-79, generate
 3051,  3080,     1
*Nset, nset=Set-80
   57,  101,  103,  161,  163,  227
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*Elset, elset=Set-80, generate
 3025,  3050,     1
*Nset, nset=Set-81
  101,  157,  161,  249,  277,  279
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*Elset, elset=Set-81, generate
 3009,  3024,     1
*Nset, nset=Set-82
   97,  101,  154,  157,  158,  247
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*Elset, elset=Set-82, generate
 2989,  3008,     1
*Nset, nset=Set-83
   97,   98,  151,  153,  154,  247
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*Elset, elset=Set-83, generate
 2969,  2988,     1
*Nset, nset=Set-84
   98,  149,  151,  248,  273,  274
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*Elset, elset=Set-84, generate
 2953,  2968,     1
*Nset, nset=Set-85
  153,  154,  275,  276,  298,  299
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*Elset, elset=Set-85, generate
 3817,  3836,     1
*Nset, nset=Set-86
  154,  158,  275,  278,  298,  302
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*Elset, elset=Set-86, generate
 3837,  3856,     1
*Nset, nset=_PickedSet164, internal
  189,  190,  195,  196,  197,  198
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*Elset, elset=_PickedSet164, internal, generate
 3741,  3816,     1
*Nset, nset=_PickedSet165, internal
  185,  186,  187,  188,  189,  190
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*Elset, elset=_PickedSet165, internal, generate
 3673,  3740,     1
*Nset, nset=_PickedSet166, internal
  122,  123,  183,  184,  185,  186
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*Elset, elset=_PickedSet166, internal, generate
 1559,  1612,     1
*Nset, nset=_PickedSet167, internal
   74,   75,  119,  120,  122,  123
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*Elset, elset=_PickedSet167, internal, generate
 1487,  1558,     1
*Nset, nset=_PickedSet168, internal
   71,   72,  116,  118,  119,  120
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*Elset, elset=_PickedSet168, internal, generate
 1439,  1486,     1
*Nset, nset=_PickedSet169, internal
   36,   37,   71,   72,   74,   75
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*Elset, elset=_PickedSet169, internal, generate
 799,  822,    1
*Nset, nset=_PickedSet170, internal
  121,  122,  123,  124,  186,  187
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*Elset, elset=_PickedSet170, internal, generate
 1613,  1630,     1
*Nset, nset=_PickedSet171, internal
   73,   74,   75,   76,  121,  122
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*Elset, elset=_PickedSet171, internal, generate
 823,  846,    1
*Nset, nset=_PickedSet172, internal
  121,  124,  189,  190,  191,  192
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*Elset, elset=_PickedSet172, internal, generate
 1727,  1744,     1
*Nset, nset=_PickedSet173, internal
   73,   76,  121,  124,  125,  126
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*Elset, elset=_PickedSet173, internal, generate
 1631,  1654,     1
*Nset, nset=_PickedSet174, internal
  191,  192,  193,  194,  195,  196
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*Elset, elset=_PickedSet174, internal, generate
 1745,  1798,     1
*Nset, nset=_PickedSet175, internal
  125,  126,  127,  128,  130,  131
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*Elset, elset=_PickedSet175, internal, generate
 1655,  1726,     1
*Nset, nset=_PickedSet176, internal
   79,   80,   82,   83,  127,  128
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*Elset, elset=_PickedSet176, internal, generate
 895,  942,    1
*Nset, nset=_PickedSet177, internal
   77,   78,   79,   80,  125,  126
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*Elset, elset=_PickedSet177, internal, generate
 871,  894,    1
*Nset, nset=_PickedSet178, internal
   35,   38,   73,   76,   77,   78
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*Elset, elset=_PickedSet178, internal, generate
 847,  870,    1
*Nset, nset=_PickedSet179, internal
   35,   36,   37,   38,   73,   74
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*Elset, elset=_PickedSet179, internal, generate
 445,  468,    1
*Nset, nset=_PickedSet180, internal
  115,  116,  117,  118,  177,  178
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*Elset, elset=_PickedSet180, internal, generate
 1421,  1438,     1
*Nset, nset=_PickedSet181, internal
   69,   70,   71,   72,  115,  116
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*Elset, elset=_PickedSet181, internal, generate
 781,  798,    1
*Nset, nset=_PickedSet182, internal
   31,   34,   36,   37,   69,   70
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*Elset, elset=_PickedSet182, internal, generate
 427,  444,    1
*Nset, nset=_PickedSet183, internal
   31,   32,   33,   34,   35,   36
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*Elset, elset=_PickedSet183, internal, generate
 163,  180,    1
*Nset, nset=_PickedSet184, internal
   32,   33,   35,   38,   39,   40
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*Elset, elset=_PickedSet184, internal, generate
 469,  486,    1
*Nset, nset=_PickedSet185, internal
   39,   40,   42,   43,   77,   78
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*Elset, elset=_PickedSet185, internal, generate
 487,  504,    1
*Nset, nset=_PickedSet186, internal
   42,   43,   79,   80,   81,   82
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*Elset, elset=_PickedSet186, internal, generate
 505,  522,    1
*Nset, nset=_PickedSet187, internal
   81,   82,   83,   84,  129,  132
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*Elset, elset=_PickedSet187, internal, generate
 943,  960,    1
*Nset, nset=_PickedSet188, internal
   81,   84,   85,   86,  133,  134
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*Elset, elset=_PickedSet188, internal, generate
 961,  978,    1
*Nset, nset=_PickedSet189, internal
   41,   42,   43,   44,   81,   84
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*Elset, elset=_PickedSet189, internal, generate
 523,  540,    1
*Nset, nset=_PickedSet190, internal
    2,    5,   39,   40,   41,   42
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*Elset, elset=_PickedSet190, internal, generate
 199,  216,    1
*Nset, nset=_PickedSet191, internal
    1,    2,    5,    8,   32,   33
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*Elset, elset=_PickedSet191, internal, generate
 181,  198,    1
*Nset, nset=_PickedSet192, internal
    1,    8,   29,   30,   31,   32
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*Elset, elset=_PickedSet192, internal, generate
 145,  162,    1
*Nset, nset=_PickedSet193, internal
   29,   30,   31,   34,   67,   68
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*Elset, elset=_PickedSet193, internal, generate
 409,  426,    1
*Nset, nset=_PickedSet194, internal
   67,   68,   69,   70,  113,  114
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*Elset, elset=_PickedSet194, internal, generate
 3597,  3614,     1
*Nset, nset=_PickedSet195, internal
  113,  114,  115,  117,  175,  176
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*Elset, elset=_PickedSet195, internal, generate
 1403,  1420,     1
*Nset, nset=_PickedSet196, internal
  153,  154,  155,  156,  298,  299
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*Elset, elset=_PickedSet196, internal, generate
 3633,  3652,     1
*Nset, nset=_PickedSet197, internal
  154,  156,  158,  160,  298,  300
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*Elset, elset=_PickedSet197, internal, generate
 3653,  3672,     1
*Nset, nset=_PickedSet198, internal
   97,   98,   99,  100,  151,  152
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*Elset, elset=_PickedSet198, internal, generate
 1171,  1190,     1
*Nset, nset=_PickedSet199, internal
   97,  100,  101,  102,  154,  156
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*Elset, elset=_PickedSet199, internal, generate
 1191,  1210,     1
*Nset, nset=_PickedSet200, internal
   98,   99,  149,  150,  151,  152
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*Elset, elset=_PickedSet200, internal, generate
 1155,  1170,     1
*Nset, nset=_PickedSet201, internal
  101,  102,  157,  159,  161,  162
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*Elset, elset=_PickedSet201, internal, generate
 1211,  1226,     1
*Nset, nset=_PickedSet202, internal
   95,   96,  145,  146,  147,  148
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*Elset, elset=_PickedSet202, internal, generate
 1099,  1128,     1
*Nset, nset=_PickedSet203, internal
   53,   56,   95,   96,   98,   99
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*Elset, elset=_PickedSet203, internal, generate
 1129,  1154,     1
*Nset, nset=_PickedSet204, internal
   53,   54,   55,   56,   97,   98
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*Elset, elset=_PickedSet204, internal, generate
 637,  660,    1
*Nset, nset=_PickedSet205, internal
   54,   55,   57,   58,   97,  100
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*Elset, elset=_PickedSet205, internal, generate
 661,  684,    1
*Nset, nset=_PickedSet206, internal
   57,   58,  101,  102,  103,  104
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*Elset, elset=_PickedSet206, internal, generate
 1227,  1252,     1
*Nset, nset=_PickedSet207, internal
  103,  104,  163,  164,  165,  166
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*Elset, elset=_PickedSet207, internal, generate
 1253,  1282,     1
*Nset, nset=_PickedSet208, internal
   51,   52,   93,   94,   95,   96
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*Elset, elset=_PickedSet208, internal, generate
 1051,  1098,     1
*Nset, nset=_PickedSet209, internal
   18,   19,   51,   52,   53,   56
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*Elset, elset=_PickedSet209, internal, generate
 613,  636,    1
*Nset, nset=_PickedSet210, internal
   17,   18,   19,   20,   53,   54
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*Elset, elset=_PickedSet210, internal, generate
 289,  312,    1
*Nset, nset=_PickedSet211, internal
   17,   20,   21,   24,   54,   55
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*Elset, elset=_PickedSet211, internal, generate
 313,  336,    1
*Nset, nset=_PickedSet212, internal
   21,   24,   57,   58,   59,   62
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*Elset, elset=_PickedSet212, internal, generate
 685,  708,    1
*Nset, nset=_PickedSet213, internal
   59,   60,   61,   62,  105,  106
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*Elset, elset=_PickedSet213, internal, generate
 709,  726,    1
*Nset, nset=_PickedSet214, internal
   59,   62,  103,  104,  106,  107
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*Elset, elset=_PickedSet214, internal, generate
 1283,  1330,     1
*Nset, nset=_PickedSet215, internal
   91,   92,   93,   94,  141,  142
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*Elset, elset=_PickedSet215, internal, generate
 1033,  1050,     1
*Nset, nset=_PickedSet216, internal
   49,   50,   51,   52,   91,   92
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*Elset, elset=_PickedSet216, internal, generate
 595,  612,    1
*Nset, nset=_PickedSet217, internal
   10,   11,   13,   16,   47,   48
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*Elset, elset=_PickedSet217, internal, generate
 253,  270,    1
*Nset, nset=_PickedSet218, internal
   13,   16,   18,   19,   49,   50
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*Elset, elset=_PickedSet218, internal, generate
 271,  288,    1
*Nset, nset=_PickedSet219, internal
    9,   10,   11,   12,   13,   14
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*Elset, elset=_PickedSet219, internal, generate
 37,  54,   1
*Nset, nset=_PickedSet220, internal
   13,   14,   15,   16,   17,   18
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*Elset, elset=_PickedSet220, internal, generate
 55,  72,   1
*Nset, nset=_PickedSet221, internal
   14,   15,   17,   20,   21,   22
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*Elset, elset=_PickedSet221, internal, generate
 73,  90,   1
*Nset, nset=_PickedSet222, internal
   21,   22,   23,   24,   59,   60
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*Elset, elset=_PickedSet222, internal, generate
 337,  354,    1
*Nset, nset=_PickedSet223, internal
  105,  106,  107,  108,  167,  168
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*Elset, elset=_PickedSet223, internal, generate
 1331,  1348,     1
*Nset, nset=_PickedSet224, internal
   89,   90,   91,   92,  139,  140
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*Elset, elset=_PickedSet224, internal, generate
 1015,  1032,     1
*Nset, nset=_PickedSet225, internal
   47,   48,   49,   50,   89,   90
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*Elset, elset=_PickedSet225, internal, generate
 577,  594,    1
*Nset, nset=_PickedSet226, internal
   87,   88,   89,   90,  137,  138
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*Elset, elset=_PickedSet226, internal, generate
  997,  1014,     1
*Nset, nset=_PickedSet227, internal
   85,   86,   87,   88,  135,  136
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*Elset, elset=_PickedSet227, internal, generate
 979,  996,    1
*Nset, nset=_PickedSet228, internal
   41,   44,   45,   46,   85,   86
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*Elset, elset=_PickedSet228, internal, generate
 541,  558,    1
*Nset, nset=_PickedSet229, internal
   45,   46,   47,   48,   87,   88
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*Elset, elset=_PickedSet229, internal, generate
 559,  576,    1
*Nset, nset=_PickedSet230, internal
    3,    6,   10,   11,   45,   46
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*Elset, elset=_PickedSet230, internal, generate
 235,  252,    1
*Nset, nset=_PickedSet231, internal
    2,    3,    5,    6,   41,   44
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*Elset, elset=_PickedSet231, internal, generate
 217,  234,    1
*Nset, nset=_PickedSet232, internal
    1,    2,    3,    4,    5,    6
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*Elset, elset=_PickedSet232, internal, generate
  1,  18,   1
*Nset, nset=_PickedSet233, internal
    4,    7,    9,   12,   25,   26
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*Elset, elset=_PickedSet233, internal, generate
 109,  126,    1
*Nset, nset=_PickedSet234, internal
    3,    4,    6,    7,    9,   10
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*Elset, elset=_PickedSet234, internal, generate
 19,  36,   1
*Nset, nset=_PickedSet235, internal
    1,    4,    7,    8,   27,   28
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*Elset, elset=_PickedSet235, internal, generate
 127,  144,    1
*Nset, nset=_PickedSet236, internal
    9,   12,   14,   15,   22,   23
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*Elset, elset=_PickedSet236, internal, generate
  91,  108,    1
*Nset, nset=_PickedSet237, internal
   22,   23,   25,   26,   60,   61
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*Elset, elset=_PickedSet237, internal, generate
 355,  372,    1
*Nset, nset=_PickedSet238, internal
   65,   66,   67,   68,  111,  112
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*Elset, elset=_PickedSet238, internal, generate
 763,  780,    1
*Nset, nset=_PickedSet239, internal
   27,   28,   29,   30,   65,   66
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*Elset, elset=_PickedSet239, internal, generate
 391,  408,    1
*Nset, nset=_PickedSet240, internal
   25,   26,   27,   28,   63,   64
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*Elset, elset=_PickedSet240, internal, generate
 373,  390,    1
*Nset, nset=_PickedSet241, internal
  111,  112,  113,  114,  173,  174
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*Elset, elset=_PickedSet241, internal, generate
 1385,  1402,     1
*Nset, nset=_PickedSet242, internal
  109,  110,  111,  112,  171,  172
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*Elset, elset=_PickedSet242, internal, generate
 1367,  1384,     1
*Nset, nset=_PickedSet243, internal
   63,   64,   65,   66,  109,  110
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*Elset, elset=_PickedSet243, internal, generate
 745,  762,    1
*Nset, nset=_PickedSet244, internal
   60,   61,   63,   64,  105,  108
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*Elset, elset=_PickedSet244, internal, generate
 727,  744,    1
*Nset, nset=_PickedSet245, internal
  105,  108,  109,  110,  169,  170
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*Elset, elset=_PickedSet245, internal, generate
 1349,  1366,     1
** Section: Section-2
*Solid Section, elset=_PickedSet232, material=Material-passive
,
** Section: Section-2
*Solid Section, elset=_PickedSet234, material=Material-passive
,
** Section: Section-2
*Solid Section, elset=_PickedSet219, material=Material-passive
,
** Section: Section-2
*Solid Section, elset=_PickedSet220, material=Material-passive
,
** Section: Section-2
*Solid Section, elset=_PickedSet221, material=Material-passive
,
** Section: Section-2
*Solid Section, elset=_PickedSet236, material=Material-passive
,
** Section: Section-2
*Solid Section, elset=_PickedSet233, material=Material-passive
,
** Section: Section-1
*Solid Section, elset=_PickedSet235, material=Material-active
,
** Section: Section-1
*Solid Section, elset=_PickedSet192, material=Material-active
,
** Section: Section-1
*Solid Section, elset=_PickedSet183, material=Material-active
,
** Section: Section-2
*Solid Section, elset=_PickedSet191, material=Material-passive
,
** Section: Section-1
*Solid Section, elset=_PickedSet190, material=Material-active
,
** Section: Section-1
*Solid Section, elset=_PickedSet231, material=Material-active
,
** Section: Section-2
*Solid Section, elset=_PickedSet230, material=Material-passive
,
** Section: Section-2
*Solid Section, elset=_PickedSet217, material=Material-passive
,
** Section: Section-2
*Solid Section, elset=_PickedSet218, material=Material-passive
,
** Section: Section-2
*Solid Section, elset=_PickedSet210, material=Material-passive
,
** Section: Section-1
*Solid Section, elset=_PickedSet211, material=Material-active
,
** Section: Section-2
*Solid Section, elset=_PickedSet222, material=Material-passive
,
** Section: Section-2
*Solid Section, elset=_PickedSet237, material=Material-passive
,
** Section: Section-2
*Solid Section, elset=_PickedSet240, material=Material-passive
,
** Section: Section-2
*Solid Section, elset=_PickedSet239, material=Material-passive
,
** Section: Section-2
*Solid Section, elset=_PickedSet193, material=Material-passive
,
** Section: Section-1
*Solid Section, elset=_PickedSet182, material=Material-active
,
** Section: Section-1
*Solid Section, elset=_PickedSet179, material=Material-active
,
** Section: Section-1
*Solid Section, elset=_PickedSet184, material=Material-active
,
** Section: Section-1
*Solid Section, elset=_PickedSet185, material=Material-active
,
** Section: Section-2
*Solid Section, elset=_PickedSet186, material=Material-passive
,
** Section: Section-1
*Solid Section, elset=_PickedSet189, material=Material-active
,
** Section: Section-2
*Solid Section, elset=_PickedSet228, material=Material-passive
,
** Section: Section-2
*Solid Section, elset=_PickedSet229, material=Material-passive
,
** Section: Section-2
*Solid Section, elset=_PickedSet225, material=Material-passive
,
** Section: Section-2
*Solid Section, elset=_PickedSet216, material=Material-passive
,
** Section: Section-1
*Solid Section, elset=_PickedSet209, material=Material-active
,
** Section: Section-1
*Solid Section, elset=_PickedSet204, material=Material-active
,
** Section: Section-1
*Solid Section, elset=_PickedSet205, material=Material-active
,
** Section: Section-2
*Solid Section, elset=_PickedSet212, material=Material-passive
,
** Section: Section-2
*Solid Section, elset=_PickedSet213, material=Material-passive
,
** Section: Section-1
*Solid Section, elset=_PickedSet244, material=Material-active
,
** Section: Section-2
*Solid Section, elset=_PickedSet243, material=Material-passive
,
** Section: Section-1
*Solid Section, elset=_PickedSet238, material=Material-active
,
** Section: Section-2
*Solid Section, elset=_PickedSet181, material=Material-passive
,
** Section: Section-1
*Solid Section, elset=_PickedSet169, material=Material-active
,
** Section: Section-1
*Solid Section, elset=_PickedSet171, material=Material-active
,
** Section: Section-1
*Solid Section, elset=_PickedSet178, material=Material-active
,
** Section: Section-1
*Solid Section, elset=_PickedSet177, material=Material-active
,
** Section: Section-1
*Solid Section, elset=_PickedSet176, material=Material-active
,
** Section: Section-2
*Solid Section, elset=_PickedSet187, material=Material-passive
,
** Section: Section-2
*Solid Section, elset=_PickedSet188, material=Material-passive
,
** Section: Section-2
*Solid Section, elset=_PickedSet227, material=Material-passive
,
** Section: Section-2
*Solid Section, elset=_PickedSet226, material=Material-passive
,
** Section: Section-2
*Solid Section, elset=_PickedSet224, material=Material-passive
,
** Section: Section-2
*Solid Section, elset=_PickedSet215, material=Material-passive
,
** Section: Section-2
*Solid Section, elset=_PickedSet208, material=Material-passive
,
** Section: Section-2
*Solid Section, elset=_PickedSet202, material=Material-passive
,
** Section: Section-2
*Solid Section, elset=_PickedSet203, material=Material-passive
,
** Section: Section-1
*Solid Section, elset=_PickedSet200, material=Material-active
,
** Section: Section-1
*Solid Section, elset=_PickedSet198, material=Material-active
,
** Section: Section-1
*Solid Section, elset=_PickedSet199, material=Material-active
,
** Section: Section-1
*Solid Section, elset=_PickedSet201, material=Material-active
,
** Section: Section-2
*Solid Section, elset=_PickedSet206, material=Material-passive
,
** Section: Section-1
*Solid Section, elset=_PickedSet207, material=Material-active
,
** Section: Section-1
*Solid Section, elset=_PickedSet214, material=Material-active
,
** Section: Section-2
*Solid Section, elset=_PickedSet223, material=Material-passive
,
** Section: Section-1
*Solid Section, elset=_PickedSet245, material=Material-active
,
** Section: Section-2
*Solid Section, elset=_PickedSet242, material=Material-passive
,
** Section: Section-2
*Solid Section, elset=_PickedSet241, material=Material-passive
,
** Section: Section-2
*Solid Section, elset=_PickedSet195, material=Material-passive
,
** Section: Section-1
*Solid Section, elset=_PickedSet180, material=Material-active
,
** Section: Section-2
*Solid Section, elset=_PickedSet168, material=Material-passive
,
** Section: Section-1
*Solid Section, elset=_PickedSet167, material=Material-active
,
** Section: Section-1
*Solid Section, elset=_PickedSet166, material=Material-active
,
** Section: Section-1
*Solid Section, elset=_PickedSet170, material=Material-active
,
** Section: Section-1
*Solid Section, elset=_PickedSet173, material=Material-active
,
** Section: Section-1
*Solid Section, elset=_PickedSet175, material=Material-active
,
** Section: Section-1
*Solid Section, elset=_PickedSet172, material=Material-active
,
** Section: Section-1
*Solid Section, elset=_PickedSet174, material=Material-active
,
** Section: Section-1
*Solid Section, elset=Set-41, material=Material-active
,
** Section: Section-1
*Solid Section, elset=Set-48, material=Material-active
,
** Section: Section-1
*Solid Section, elset=Set-57, material=Material-active
,
** Section: Section-1
*Solid Section, elset=Set-64, material=Material-active
,
** Section: Section-1
*Solid Section, elset=Set-65, material=Material-active
,
** Section: Section-1
*Solid Section, elset=Set-56, material=Material-active
,
** Section: Section-1
*Solid Section, elset=Set-49, material=Material-active
,
** Section: Section-2
*Solid Section, elset=Set-40, material=Material-passive
,
** Section: Section-2
*Solid Section, elset=Set-33, material=Material-passive
,
** Section: Section-1
*Solid Section, elset=Set-24, material=Material-active
,
** Section: Section-2
*Solid Section, elset=Set-32, material=Material-passive
,
** Section: Section-1
*Solid Section, elset=Set-31, material=Material-active
,
** Section: Section-2
*Solid Section, elset=Set-42, material=Material-passive
,
** Section: Section-1
*Solid Section, elset=Set-47, material=Material-active
,
** Section: Section-1
*Solid Section, elset=Set-58, material=Material-active
,
** Section: Section-1
*Solid Section, elset=Set-63, material=Material-active
,
** Section: Section-1
*Solid Section, elset=Set-71, material=Material-active
,
** Section: Section-2
*Solid Section, elset=Set-72, material=Material-passive
,
** Section: Section-1
*Solid Section, elset=Set-67, material=Material-active
,
** Section: Section-2
*Solid Section, elset=Set-55, material=Material-passive
,
** Section: Section-1
*Solid Section, elset=Set-50, material=Material-active
,
** Section: Section-1
*Solid Section, elset=Set-39, material=Material-active
,
** Section: Section-2
*Solid Section, elset=Set-34, material=Material-passive
,
** Section: Section-2
*Solid Section, elset=Set-23, material=Material-passive
,
** Section: Section-1
*Solid Section, elset=Set-18, material=Material-active
,
** Section: Section-1
*Solid Section, elset=Set-25, material=Material-active
,
** Section: Section-1
*Solid Section, elset=Set-26, material=Material-active
,
** Section: Section-2
*Solid Section, elset=Set-27, material=Material-passive
,
** Section: Section-2
*Solid Section, elset=Set-30, material=Material-passive
,
** Section: Section-1
*Solid Section, elset=Set-43, material=Material-active
,
** Section: Section-1
*Solid Section, elset=Set-46, material=Material-active
,
** Section: Section-1
*Solid Section, elset=Set-59, material=Material-active
,
** Section: Section-1
*Solid Section, elset=Set-62, material=Material-active
,
** Section: Section-2
*Solid Section, elset=Set-73, material=Material-passive
,
** Section: Section-2
*Solid Section, elset=Set-77, material=Material-passive
,
** Section: Section-2
*Solid Section, elset=Set-78, material=Material-passive
,
** Section: Section-2
*Solid Section, elset=Set-70, material=Material-passive
,
** Section: Section-1
*Solid Section, elset=Set-66, material=Material-active
,
** Section: Section-1
*Solid Section, elset=Set-54, material=Material-active
,
** Section: Section-1
*Solid Section, elset=Set-51, material=Material-active
,
** Section: Section-1
*Solid Section, elset=Set-38, material=Material-active
,
** Section: Section-2
*Solid Section, elset=Set-22, material=Material-passive
,
** Section: Section-1
*Solid Section, elset=Set-19, material=Material-active
,
** Section: Section-2
*Solid Section, elset=Set-12, material=Material-passive
,
** Section: Section-1
*Solid Section, elset=Set-17, material=Material-active
,
** Section: Section-2
*Solid Section, elset=Set-16, material=Material-passive
,
** Section: Section-2
*Solid Section, elset=Set-15, material=Material-passive
,
** Section: Section-2
*Solid Section, elset=Set-28, material=Material-passive
,
** Section: Section-2
*Solid Section, elset=Set-29, material=Material-passive
,
** Section: Section-1
*Solid Section, elset=Set-44, material=Material-active
,
** Section: Section-2
*Solid Section, elset=Set-45, material=Material-passive
,
** Section: Section-1
*Solid Section, elset=Set-60, material=Material-active
,
** Section: Section-2
*Solid Section, elset=Set-61, material=Material-passive
,
** Section: Section-1
*Solid Section, elset=Set-74, material=Material-active
,
** Section: Section-2
*Solid Section, elset=Set-75, material=Material-passive
,
** Section: Section-2
*Solid Section, elset=Set-76, material=Material-passive
,
** Section: Section-1
*Solid Section, elset=Set-84, material=Material-active
,
** Section: Section-2
*Solid Section, elset=Set-83, material=Material-passive
,
** Section: Section-2
*Solid Section, elset=Set-82, material=Material-passive
,
** Section: Section-2
*Solid Section, elset=Set-81, material=Material-passive
,
** Section: Section-1
*Solid Section, elset=Set-80, material=Material-active
,
** Section: Section-2
*Solid Section, elset=Set-79, material=Material-passive
,
** Section: Section-2
*Solid Section, elset=Set-69, material=Material-passive
,
** Section: Section-2
*Solid Section, elset=Set-68, material=Material-passive
,
** Section: Section-1
*Solid Section, elset=Set-53, material=Material-active
,
** Section: Section-1
*Solid Section, elset=Set-52, material=Material-active
,
** Section: Section-1
*Solid Section, elset=Set-37, material=Material-active
,
** Section: Section-1
*Solid Section, elset=Set-36, material=Material-active
,
** Section: Section-2
*Solid Section, elset=Set-21, material=Material-passive
,
** Section: Section-2
*Solid Section, elset=Set-20, material=Material-passive
,
** Section: Section-2
*Solid Section, elset=Set-11, material=Material-passive
,
** Section: Section-2
*Solid Section, elset=Set-10, material=Material-passive
,
** Section: Section-2
*Solid Section, elset=Set-9, material=Material-passive
,
** Section: Section-2
*Solid Section, elset=Set-13, material=Material-passive
,
** Section: Section-2
*Solid Section, elset=Set-14, material=Material-passive
,
** Section: Section-2
*Solid Section, elset=Set-8, material=Material-passive
,
** Section: Section-2
*Solid Section, elset=Set-7, material=Material-passive
,
** Section: Section-2
*Solid Section, elset=_PickedSet194, material=Material-passive
,
** Section: Section-1
*Solid Section, elset=Set-35, material=Material-active
,
** Section: Section-1
*Solid Section, elset=_PickedSet196, material=Material-active
,
** Section: Section-1
*Solid Section, elset=_PickedSet197, material=Material-active
,
** Section: Section-1
*Solid Section, elset=_PickedSet165, material=Material-active
,
** Section: Section-1
*Solid Section, elset=_PickedSet164, material=Material-active
,
** Section: Section-2
*Solid Section, elset=Set-85, material=Material-passive
,
** Section: Section-2
*Solid Section, elset=Set-86, material=Material-passive
,
** Section: Section-2
*Solid Section, elset=Set-5, material=Material-passive
,
** Section: Section-2
*Solid Section, elset=Set-6, material=Material-passive
,
*End Part
**
**
** ASSEMBLY
**
*Assembly, name=Assembly
**
*Instance, name=Part-1-1, part=Part-1
*End Instance
**
*Nset, nset=_PickedSet4, internal, instance=Part-1-1
 308, 313, 319, 320
*Nset, nset=_PickedSet5, internal, instance=Part-1-1, generate
    1,  5300,     1
*Elset, elset=_PickedSet5, internal, instance=Part-1-1, generate
    1,  4000,     1
*End Assembly
**
** MATERIALS
**
*Material, name=Material-active
*Density
 1e-06,
*Expansion
 0.001,
*Hyperelastic, neo hooke
 0.1, 0.002
*Material, name=Material-passive
*Density
 1e-06,
*Expansion
0.,
*Hyperelastic, neo hooke
 0.1, 0.002
**
** BOUNDARY CONDITIONS
**
** Name: BC-1 Type: 位移/转角
*Boundary
_PickedSet4, 1, 1
_PickedSet4, 2, 2
_PickedSet4, 3, 3
**
** PREDEFINED FIELDS
**
** Name: Predefined Field-1   Type: Temperature
*Initial Conditions, type=TEMPERATURE
_PickedSet5, 25.
** ----------------------------------------------------------------
**
** STEP: Step-1
**
*Step, name=Step-1, nlgeom=YES, inc=10000
*Static
0.1, 6., 1e-05, 0.5
**
** PREDEFINED FIELDS
**
** Name: Predefined Field-1   Type: Temperature
*Temperature
_PickedSet5, 85.
**
** OUTPUT REQUESTS
**
*Restart, write, frequency=0
**
** FIELD OUTPUT: F-Output-1
**
*Output, field, number interval=4
*Node Output
NT, U
*Element Output, directions=YES
S, TEMP
**
** HISTORY OUTPUT: H-Output-1
**
*Output, history, variable=PRESELECT
*End Step
