*Heading
** Job name: curvedsurface Model name: Model-1
** Generated by: Abaqus/CAE 2020
*Preprint, echo=NO, model=NO, history=NO, contact=NO
**
** PARTS
**
*Part, name=butterfly
*Node
      1,    40.311821,   26.2984238,          0.5
      2,   41.0497818,   31.0535316,          0.5
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*Element, type=C3D8H
 1,  5588,  5589, 15327, 15324,   807,   808,  5575,  5574
 2,  5589,   813,  5584, 15327,   808,     1,   809,  5575
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*Element, type=C3D10H
12693, 19458, 19459, 19460, 19461, 20586, 20585, 20584, 20588, 20587, 20589
12694, 19458, 19462, 19463, 19464, 20592, 20591, 20590, 20594, 20593, 20595
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*Nset, nset=_PickedSet209, internal
   190,   194,   196,   199,   200,   201
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*Elset, elset=_PickedSet209, internal, generate
 2583,  2662,     1
*Nset, nset=_PickedSet210, internal
   190,   191,   192,   193,   194,   195
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*Elset, elset=_PickedSet210, internal, generate
 2543,  2582,     1
*Nset, nset=_PickedSet211, internal
   191,   192,   195,   197,   288,   289
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*Elset, elset=_PickedSet211, internal, generate
 3623,  3650,     1
*Nset, nset=_PickedSet212, internal
   200,   201,   202,   203,   204,   205
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*Elset, elset=_PickedSet212, internal, generate
 2663,  2732,     1
*Nset, nset=_PickedSet213, internal
   192,   193,   197,   198,   668,   671
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*Elset, elset=_PickedSet213, internal, generate
  9949,  10052,      1
*Nset, nset=_PickedSet214, internal
   192,   197,   283,   284,   285,   287
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*Elset, elset=_PickedSet214, internal, generate
 9803,  9948,     1
*Nset, nset=_PickedSet215, internal
   277,   278,   279,   281,   282,   283
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*Elset, elset=_PickedSet215, internal, generate
 3561,  3622,     1
*Nset, nset=_PickedSet216, internal
   276,   277,   278,   279,   280,   281
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*Elset, elset=_PickedSet216, internal, generate
 3523,  3560,     1
*Nset, nset=_PickedSet217, internal
   276,   277,   279,   280,   298,   302
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*Elset, elset=_PickedSet217, internal, generate
 9721,  9802,     1
*Nset, nset=_PickedSet218, internal
   277,   279,   282,   286,   298,   299
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*Elset, elset=_PickedSet218, internal, generate
 3687,  3736,     1
*Nset, nset=_PickedSet219, internal
   283,   287,   290,   291,   294,   295
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*Elset, elset=_PickedSet219, internal, generate
 10167,  10234,      1
*Nset, nset=_PickedSet220, internal
   209,   214,   290,   294,   645,   646
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*Elset, elset=_PickedSet220, internal, generate
 10283,  10376,      1
*Nset, nset=_PickedSet221, internal
   204,   205,   206,   207,   208,   209
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*Elset, elset=_PickedSet221, internal, generate
 9371,  9440,     1
*Nset, nset=_PickedSet222, internal
   208,   209,   210,   211,   212,   213
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*Elset, elset=_PickedSet222, internal, generate
 2733,  2778,     1
*Nset, nset=_PickedSet223, internal
   211,   212,   215,   217,   218,   219
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*Elset, elset=_PickedSet223, internal, generate
 2779,  2814,     1
*Nset, nset=_PickedSet224, internal
   218,   219,   220,   221,   222,   223
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*Elset, elset=_PickedSet224, internal, generate
 2815,  2850,     1
*Nset, nset=_PickedSet233, internal
   209,   210,   214,   216,   290,   293
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*Elset, elset=_PickedSet233, internal, generate
 12627,  12658,      1
*Nset, nset=_PickedSet234, internal
   290,   291,   292,   293,   294,   295
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*Elset, elset=_PickedSet234, internal, generate
 3651,  3686,     1
*Nset, nset=_PickedSet235, internal
   299,   300,   301,   303,   658,   659
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*Elset, elset=_PickedSet235, internal, generate
 10377,  10446,      1
*Nset, nset=_PickedSet236, internal
   651,   652,   653,   654,   658,   659
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*Elset, elset=_PickedSet236, internal, generate
 9615,  9720,     1
*Nset, nset=_PickedSet237, internal
   292,   293,   296,   297,   305,   309
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*Elset, elset=_PickedSet237, internal, generate
 10235,  10282,      1
*Nset, nset=_PickedSet238, internal
   304,   305,   308,   309,   474,   475
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*Elset, elset=_PickedSet238, internal, generate
 10119,  10166,      1
*Nset, nset=_PickedSet239, internal
   222,   223,   224,   225,   472,   473
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*Elset, elset=_PickedSet239, internal, generate
 9441,  9488,     1
*Nset, nset=_PickedSet240, internal
   304,   307,   308,   311,   416,   417
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*Elset, elset=_PickedSet240, internal, generate
 5499,  5596,     1
*Nset, nset=_PickedSet241, internal
   304,   305,   306,   307,   308,   309
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*Elset, elset=_PickedSet241, internal, generate
 3737,  3772,     1
*Nset, nset=_PickedSet242, internal
   305,   306,   309,   310,   658,   662
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*Elset, elset=_PickedSet242, internal, generate
 10053,  10118,      1
*Nset, nset=_PickedSet243, internal
   651,   653,   658,   662,   678,   683
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*Elset, elset=_PickedSet243, internal, generate
 10447,  10496,      1
*Nset, nset=_PickedSet244, internal
   418,   419,   451,   452,   707,   708
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*Elset, elset=_PickedSet244, internal, generate
 10553,  10576,      1
*Nset, nset=_PickedSet245, internal
   226,   230,   414,   415,   434,   435
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*Elset, elset=_PickedSet245, internal, generate
 5597,  5674,     1
*Nset, nset=_PickedSet246, internal
   414,   415,   416,   417,   418,   419
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*Elset, elset=_PickedSet246, internal, generate
 5267,  5336,     1
*Nset, nset=_PickedSet247, internal
   421,   422,   450,   457,   713,   714
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*Elset, elset=_PickedSet247, internal, generate
 10631,  10654,      1
*Nset, nset=_PickedSet248, internal
   435,   436,   481,   482,   722,   723
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*Elset, elset=_PickedSet248, internal, generate
 10815,  10850,      1
*Nset, nset=_PickedSet249, internal
   650,   651,   653,   657,   706,   709
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*Elset, elset=_PickedSet249, internal, generate
 10497,  10552,      1
*Nset, nset=_PickedSet250, internal
   272,   273,   274,   275,   648,   649
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*Elset, elset=_PickedSet250, internal, generate
 9527,  9614,     1
*Nset, nset=_PickedSet251, internal
   266,   267,   268,   271,   272,   273
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*Elset, elset=_PickedSet251, internal, generate
 3453,  3522,     1
*Nset, nset=_PickedSet252, internal
   259,   260,   261,   263,   264,   265
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*Elset, elset=_PickedSet252, internal, generate
 3349,  3452,     1
*Nset, nset=_PickedSet253, internal
   239,   242,   244,   247,   258,   259
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*Elset, elset=_PickedSet253, internal, generate
 3267,  3348,     1
*Nset, nset=_PickedSet254, internal
   264,   265,   269,   270,   649,   650
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*Elset, elset=_PickedSet254, internal, generate
 10655,  10714,      1
*Nset, nset=_PickedSet255, internal
   650,   657,   712,   715,   720,   721
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*Elset, elset=_PickedSet255, internal, generate
 10577,  10630,      1
*Nset, nset=_PickedSet256, internal
   227,   229,   232,   235,   720,   721
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*Elset, elset=_PickedSet256, internal, generate
 10715,  10814,      1
*Nset, nset=_PickedSet257, internal
   226,   227,   229,   230,   439,   478
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*Elset, elset=_PickedSet257, internal, generate
 12553,  12594,      1
*Nset, nset=_PickedSet258, internal
   238,   239,   241,   242,   258,   262
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*Elset, elset=_PickedSet258, internal, generate
 10851,  10912,      1
*Nset, nset=_PickedSet259, internal
   233,   234,   236,   237,   238,   239
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*Elset, elset=_PickedSet259, internal, generate
 2947,  3012,     1
*Nset, nset=_PickedSet260, internal
   227,   228,   229,   231,   232,   233
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*Elset, elset=_PickedSet260, internal, generate
 2889,  2946,     1
*Nset, nset=_PickedSet261, internal
   226,   227,   228,   229,   230,   231
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*Elset, elset=_PickedSet261, internal, generate
 2851,  2888,     1
*Nset, nset=_PickedSet262, internal
   239,   240,   242,   243,   244,   245
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*Elset, elset=_PickedSet262, internal, generate
 3013,  3122,     1
*Nset, nset=_PickedSet263, internal
   245,   246,   248,   249,   250,   251
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*Elset, elset=_PickedSet263, internal, generate
 3123,  3194,     1
*Nset, nset=_PickedSet264, internal
   250,   251,   252,   253,   254,   255
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*Elset, elset=_PickedSet264, internal, generate
 3195,  3266,     1
*Nset, nset=_PickedSet265, internal
   254,   255,   256,   257,  2338,  2339
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*Elset, elset=_PickedSet265, internal, generate
 9489,  9526,     1
*Nset, nset=_PickedSet266, internal
    37,    38,   136,   137,   466,   468
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*Elset, elset=_PickedSet266, internal, generate
 5773,  5828,     1
*Nset, nset=_PickedSet267, internal
    91,    92,   162,   163,   395,   396
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*Elset, elset=_PickedSet267, internal, generate
 5675,  5772,     1
*Nset, nset=_PickedSet268, internal
   371,   372,   385,   386,   389,   390
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*Elset, elset=_PickedSet268, internal, generate
 4977,  5040,     1
*Nset, nset=_PickedSet269, internal
    43,   139,   371,   372,   373,   374
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*Elset, elset=_PickedSet269, internal, generate
 4899,  4976,     1
*Nset, nset=_PickedSet270, internal
    42,    43,    44,   138,   139,   140
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*Elset, elset=_PickedSet270, internal, generate
 1617,  1668,     1
*Nset, nset=_PickedSet271, internal
    42,    43,   138,   139,   374,   383
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*Elset, elset=_PickedSet271, internal, generate
 6205,  6260,     1
*Nset, nset=_PickedSet272, internal
   377,   378,   380,   387,   498,   499
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*Elset, elset=_PickedSet272, internal, generate
 7935,  7970,     1
*Nset, nset=_PickedSet273, internal
   393,   394,   397,   398,   541,   542
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*Elset, elset=_PickedSet273, internal, generate
 8241,  8276,     1
*Nset, nset=_PickedSet274, internal
   390,   391,   400,   401,   508,   509
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*Elset, elset=_PickedSet274, internal, generate
 7899,  7934,     1
*Nset, nset=_PickedSet275, internal
    89,    90,    91,    92,   161,   162
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*Elset, elset=_PickedSet275, internal, generate
 2227,  2262,     1
*Nset, nset=_PickedSet276, internal
    89,    92,   161,   162,   467,   486
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*Elset, elset=_PickedSet276, internal, generate
 8773,  8820,     1
*Nset, nset=_PickedSet277, internal
    31,    32,    37,    38,   134,   135
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*Elset, elset=_PickedSet277, internal, generate
 1569,  1616,     1
*Nset, nset=_PickedSet278, internal
    21,    22,    31,    32,   129,   130
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*Elset, elset=_PickedSet278, internal, generate
 1521,  1568,     1
*Nset, nset=_PickedSet279, internal
    21,    22,    23,    24,    25,   129
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*Elset, elset=_PickedSet279, internal, generate
 1467,  1520,     1
*Nset, nset=_PickedSet280, internal
    89,   101,   102,   161,   182,   183
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*Elset, elset=_PickedSet280, internal, generate
 7631,  7702,     1
*Nset, nset=_PickedSet281, internal
    89,    90,   161,   164,   168,   174
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*Elset, elset=_PickedSet281, internal, generate
 9119,  9186,     1
*Nset, nset=_PickedSet282, internal
   168,   169,   174,   175,   538,   541
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*Elset, elset=_PickedSet282, internal, generate
 8719,  8772,     1
*Nset, nset=_PickedSet283, internal
   169,   175,   496,   497,   508,   510
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*Elset, elset=_PickedSet283, internal, generate
 8191,  8240,     1
*Nset, nset=_PickedSet284, internal
   496,   497,   498,   499,   500,   501
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*Elset, elset=_PickedSet284, internal, generate
 7853,  7898,     1
*Nset, nset=_PickedSet285, internal
    42,    47,   138,   143,   500,   501
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*Elset, elset=_PickedSet285, internal, generate
 7971,  8066,     1
*Nset, nset=_PickedSet286, internal
    42,    44,    45,    46,    47,   138
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*Elset, elset=_PickedSet286, internal, generate
 1669,  1740,     1
*Nset, nset=_PickedSet287, internal
    51,    52,    65,    66,    69,   144
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*Elset, elset=_PickedSet287, internal, generate
 1951,  2060,     1
*Nset, nset=_PickedSet288, internal
    57,    58,    65,    66,   147,   148
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*Elset, elset=_PickedSet288, internal, generate
 1879,  1950,     1
*Nset, nset=_PickedSet289, internal
    57,    58,    59,    60,   147,   148
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*Elset, elset=_PickedSet289, internal, generate
 1807,  1878,     1
*Nset, nset=_PickedSet290, internal
    59,    60,   149,   150,  1153,  1154
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*Elset, elset=_PickedSet290, internal, generate
 8453,  8496,     1
*Nset, nset=_PickedSet291, internal
    45,    46,    51,    52,    53,   141
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*Elset, elset=_PickedSet291, internal, generate
 1741,  1806,     1
*Nset, nset=_PickedSet292, internal
    52,    69,    71,    72,    73,   145
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*Elset, elset=_PickedSet292, internal, generate
 2061,  2156,     1
*Nset, nset=_PickedSet293, internal
    52,    53,    73,   145,   146,   156
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*Elset, elset=_PickedSet293, internal, generate
 8067,  8134,     1
*Nset, nset=_PickedSet294, internal
   496,   501,   524,   528,   529,   530
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*Elset, elset=_PickedSet294, internal, generate
 8135,  8190,     1
*Nset, nset=_PickedSet295, internal
    71,    72,    79,    80,   154,   155
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*Elset, elset=_PickedSet295, internal, generate
 8497,  8640,     1
*Nset, nset=_PickedSet296, internal
    77,    78,   157,   158,   169,   170
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*Elset, elset=_PickedSet296, internal, generate
 8641,  8718,     1
*Nset, nset=_PickedSet297, internal
    77,    78,    79,    80,   157,   158
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*Elset, elset=_PickedSet297, internal, generate
 2157,  2226,     1
*Nset, nset=_PickedSet298, internal
   168,   169,   170,   171,   172,   173
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*Elset, elset=_PickedSet298, internal, generate
 2309,  2390,     1
*Nset, nset=_PickedSet299, internal
   113,   114,   168,   173,   174,   176
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*Elset, elset=_PickedSet299, internal, generate
 9259,  9336,     1
*Nset, nset=_PickedSet300, internal
    99,   100,   101,   102,   180,   181
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*Elset, elset=_PickedSet300, internal, generate
 2391,  2426,     1
*Nset, nset=_PickedSet301, internal
    23,    24,   100,   101,   131,   132
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*Elset, elset=_PickedSet301, internal, generate
 12659,  12692,      1
*Nset, nset=_PickedSet302, internal
    17,    18,    24,    25,   127,   128
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*Elset, elset=_PickedSet302, internal, generate
 8383,  8452,     1
*Nset, nset=_PickedSet303, internal
    24,   100,   132,   181,   547,   548
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*Elset, elset=_PickedSet303, internal, generate
 8821,  8908,     1
*Nset, nset=_PickedSet304, internal
    13,    14,    17,    18,   125,   126
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*Elset, elset=_PickedSet304, internal, generate
 1397,  1466,     1
*Nset, nset=_PickedSet305, internal
     3,     9,   121,   124,   547,   548
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*Elset, elset=_PickedSet305, internal, generate
 8277,  8382,     1
*Nset, nset=_PickedSet306, internal
     7,     8,    13,    14,   122,   123
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*Elset, elset=_PickedSet306, internal, generate
 1317,  1396,     1
*Nset, nset=_PickedSet307, internal
     2,     3,     7,     8,     9,   119
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*Elset, elset=_PickedSet307, internal, generate
 1263,  1316,     1
*Nset, nset=_PickedSet308, internal
     1,     2,     3,   119,   120,   121
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*Elset, elset=_PickedSet308, internal, generate
 1231,  1262,     1
*Nset, nset=_PickedSet309, internal
     1,     3,   108,   109,   120,   121
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*Elset, elset=_PickedSet309, internal, generate
 8909,  9034,     1
*Nset, nset=_PickedSet310, internal
    99,   100,   109,   180,   181,   185
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*Elset, elset=_PickedSet310, internal, generate
 9187,  9258,     1
*Nset, nset=_PickedSet311, internal
    93,   107,   113,   114,   115,   165
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*Elset, elset=_PickedSet311, internal, generate
 2499,  2542,     1
*Nset, nset=_PickedSet312, internal
    93,    94,   115,   165,   166,   171
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*Elset, elset=_PickedSet312, internal, generate
 9035,  9118,     1
*Nset, nset=_PickedSet313, internal
    93,    95,   107,   108,   109,   165
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*Elset, elset=_PickedSet313, internal, generate
 2427,  2498,     1
*Nset, nset=_PickedSet314, internal
    93,    94,    95,   165,   166,   167
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*Elset, elset=_PickedSet314, internal, generate
 2263,  2308,     1
*Nset, nset=_PickedSet315, internal
     7,     8,    11,    12,    13,    14
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*Elset, elset=_PickedSet315, internal, generate
  87,  166,    1
*Nset, nset=_PickedSet316, internal
     2,     3,     5,     6,     7,     8
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*Elset, elset=_PickedSet316, internal, generate
 33,  86,   1
*Nset, nset=_PickedSet317, internal
     1,     2,     3,     4,     5,     6
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*Elset, elset=_PickedSet317, internal, generate
  1,  32,   1
*Nset, nset=_PickedSet318, internal
    13,    14,    15,    16,    17,    18
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*Elset, elset=_PickedSet318, internal, generate
 167,  236,    1
*Nset, nset=_PickedSet319, internal
     3,     6,     9,    10,   547,   548
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*Elset, elset=_PickedSet319, internal, generate
 6567,  6672,     1
*Nset, nset=_PickedSet320, internal
     1,     3,     4,     6,   108,   109
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*Elset, elset=_PickedSet320, internal, generate
 7199,  7324,     1
*Nset, nset=_PickedSet321, internal
    93,    95,    97,    98,   107,   108
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*Elset, elset=_PickedSet321, internal, generate
 1115,  1186,     1
*Nset, nset=_PickedSet322, internal
    93,    94,    95,    96,    97,    98
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*Elset, elset=_PickedSet322, internal, generate
 1033,  1078,     1
*Nset, nset=_PickedSet323, internal
    93,    94,    96,    97,   115,   118
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*Elset, elset=_PickedSet323, internal, generate
 7325,  7408,     1
*Nset, nset=_PickedSet324, internal
    93,    97,   107,   110,   113,   114
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*Elset, elset=_PickedSet324, internal, generate
 1187,  1230,     1
*Nset, nset=_PickedSet325, internal
    99,   100,   103,   106,   109,   111
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*Elset, elset=_PickedSet325, internal, generate
 7703,  7774,     1
*Nset, nset=_PickedSet326, internal
    24,    29,   100,   103,   547,   548
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*Elset, elset=_PickedSet326, internal, generate
 7111,  7198,     1
*Nset, nset=_PickedSet327, internal
    17,    18,    19,    20,    24,    25
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*Elset, elset=_PickedSet327, internal, generate
 6673,  6742,     1
*Nset, nset=_PickedSet328, internal
    21,    22,    23,    24,    25,    26
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*Elset, elset=_PickedSet328, internal, generate
 237,  290,    1
*Nset, nset=_PickedSet329, internal
    99,   100,   101,   102,   103,   104
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*Elset, elset=_PickedSet329, internal, generate
 1079,  1114,     1
*Nset, nset=_PickedSet330, internal
    23,    24,    29,    30,   100,   101
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*Elset, elset=_PickedSet330, internal, generate
 9337,  9370,     1
*Nset, nset=_PickedSet331, internal
   113,   114,   116,   117,   168,   173
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*Elset, elset=_PickedSet331, internal, generate
 7775,  7852,     1
*Nset, nset=_PickedSet332, internal
   168,   169,   170,   171,   172,   173
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*Elset, elset=_PickedSet332, internal, generate
 7409,  7490,     1
*Nset, nset=_PickedSet333, internal
   169,   496,   497,   502,   503,   508
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*Elset, elset=_PickedSet333, internal, generate
 6481,  6530,     1
*Nset, nset=_PickedSet334, internal
    85,    88,    91,    92,   395,   396
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*Elset, elset=_PickedSet334, internal, generate
 5401,  5498,     1
*Nset, nset=_PickedSet335, internal
    35,    36,    37,    38,   466,   468
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*Elset, elset=_PickedSet335, internal, generate
 5829,  5884,     1
*Nset, nset=_PickedSet336, internal
    86,    89,   101,   102,   104,   105
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*Elset, elset=_PickedSet336, internal, generate
 7559,  7630,     1
*Nset, nset=_PickedSet337, internal
    21,    22,    26,    27,    31,    32
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*Elset, elset=_PickedSet337, internal, generate
 291,  338,    1
*Nset, nset=_PickedSet338, internal
    31,    32,    33,    34,    35,    36
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*Elset, elset=_PickedSet338, internal, generate
 339,  386,    1
*Nset, nset=_PickedSet339, internal
    85,    86,    89,    92,   467,   469
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*Elset, elset=_PickedSet339, internal, generate
 7063,  7110,     1
*Nset, nset=_PickedSet340, internal
    85,    86,    87,    88,    89,    90
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*Elset, elset=_PickedSet340, internal, generate
  997,  1032,     1
*Nset, nset=_PickedSet341, internal
    86,    87,    89,    90,   168,   560
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*Elset, elset=_PickedSet341, internal, generate
 7491,  7558,     1
*Nset, nset=_PickedSet342, internal
   168,   169,   538,   539,   540,   541
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*Elset, elset=_PickedSet342, internal, generate
 7009,  7062,     1
*Nset, nset=_PickedSet343, internal
   393,   394,   458,   460,   541,   542
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*Elset, elset=_PickedSet343, internal, generate
 6531,  6566,     1
*Nset, nset=_PickedSet344, internal
   371,   372,   389,   390,   391,   392
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*Elset, elset=_PickedSet344, internal, generate
 5337,  5400,     1
*Nset, nset=_PickedSet345, internal
    77,    78,    81,    84,   169,   170
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*Elset, elset=_PickedSet345, internal, generate
 6931,  7008,     1
*Nset, nset=_PickedSet346, internal
   390,   391,   462,   463,   508,   509
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*Elset, elset=_PickedSet346, internal, generate
 6077,  6112,     1
*Nset, nset=_PickedSet347, internal
    77,    78,    79,    80,    81,    82
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*Elset, elset=_PickedSet347, internal, generate
 927,  996,    1
*Nset, nset=_PickedSet348, internal
    71,    72,    74,    75,    79,    80
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*Elset, elset=_PickedSet348, internal, generate
 6787,  6930,     1
*Nset, nset=_PickedSet349, internal
    52,    54,    69,    70,    71,    72
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*Elset, elset=_PickedSet349, internal, generate
 831,  926,    1
*Nset, nset=_PickedSet350, internal
    51,    52,    54,    55,    65,    66
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*Elset, elset=_PickedSet350, internal, generate
 721,  830,    1
*Nset, nset=_PickedSet351, internal
    57,    58,    61,    64,    65,    66
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*Elset, elset=_PickedSet351, internal, generate
 649,  720,    1
*Nset, nset=_PickedSet352, internal
    57,    58,    59,    60,    61,    62
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*Elset, elset=_PickedSet352, internal, generate
 577,  648,    1
*Nset, nset=_PickedSet353, internal
    59,    60,    62,    63,  1153,  1154
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*Elset, elset=_PickedSet353, internal, generate
 6743,  6786,     1
*Nset, nset=_PickedSet354, internal
    45,    46,    48,    49,    51,    52
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*Elset, elset=_PickedSet354, internal, generate
 511,  576,    1
*Nset, nset=_PickedSet355, internal
    40,    41,    42,    44,    45,    46
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*Elset, elset=_PickedSet355, internal, generate
 439,  510,    1
*Nset, nset=_PickedSet356, internal
    52,    53,    54,    56,    73,    76
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*Elset, elset=_PickedSet356, internal, generate
 6357,  6424,     1
*Nset, nset=_PickedSet357, internal
   496,   501,   503,   504,   524,   527
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*Elset, elset=_PickedSet357, internal, generate
 6425,  6480,     1
*Nset, nset=_PickedSet358, internal
    40,    42,    47,    50,   500,   501
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*Elset, elset=_PickedSet358, internal, generate
 6261,  6356,     1
*Nset, nset=_PickedSet359, internal
   496,   497,   498,   499,   500,   501
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*Elset, elset=_PickedSet359, internal, generate
 6031,  6076,     1
*Nset, nset=_PickedSet360, internal
    39,    40,    42,    43,   374,   409
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*Elset, elset=_PickedSet360, internal, generate
 6149,  6204,     1
*Nset, nset=_PickedSet361, internal
    39,    40,    41,    42,    43,    44
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*Elset, elset=_PickedSet361, internal, generate
 387,  438,    1
*Nset, nset=_PickedSet362, internal
   377,   378,   412,   413,   498,   499
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*Elset, elset=_PickedSet362, internal, generate
 6113,  6148,     1
*Nset, nset=_PickedSet363, internal
    39,    43,   371,   372,   373,   374
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*Elset, elset=_PickedSet363, internal, generate
 5041,  5118,     1
*Nset, nset=_PickedSet364, internal
   226,   331,   414,   415,   425,   431
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*Elset, elset=_PickedSet364, internal, generate
 5189,  5266,     1
*Nset, nset=_PickedSet365, internal
   245,   246,   250,   251,   339,   340
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*Elset, elset=_PickedSet365, internal, generate
 4353,  4424,     1
*Nset, nset=_PickedSet366, internal
   250,   251,   254,   255,   342,   343
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*Elset, elset=_PickedSet366, internal, generate
 4425,  4496,     1
*Nset, nset=_PickedSet367, internal
   254,   255,   344,   345,  2338,  2339
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*Elset, elset=_PickedSet367, internal, generate
 10983,  11020,      1
*Nset, nset=_PickedSet368, internal
   239,   240,   244,   245,   246,   336
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*Elset, elset=_PickedSet368, internal, generate
 4243,  4352,     1
*Nset, nset=_PickedSet369, internal
   233,   234,   238,   239,   240,   333
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*Elset, elset=_PickedSet369, internal, generate
 4177,  4242,     1
*Nset, nset=_PickedSet370, internal
   192,   283,   284,   288,   316,   357
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*Elset, elset=_PickedSet370, internal, generate
 11401,  11546,      1
*Nset, nset=_PickedSet371, internal
   276,   277,   278,   353,   354,   355
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*Elset, elset=_PickedSet371, internal, generate
 4649,  4686,     1
*Nset, nset=_PickedSet372, internal
   276,   277,   298,   353,   354,   364
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*Elset, elset=_PickedSet372, internal, generate
 11319,  11400,      1
*Nset, nset=_PickedSet373, internal
   266,   267,   272,   273,   349,   350
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*Elset, elset=_PickedSet373, internal, generate
 4579,  4648,     1
*Nset, nset=_PickedSet374, internal
   259,   260,   264,   265,   266,   267
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*Elset, elset=_PickedSet374, internal, generate
 11021,  11124,      1
*Nset, nset=_PickedSet375, internal
   239,   244,   258,   259,   260,   337
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*Elset, elset=_PickedSet375, internal, generate
 4497,  4578,     1
*Nset, nset=_PickedSet376, internal
   238,   239,   258,   337,   338,   346
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*Elset, elset=_PickedSet376, internal, generate
 12449,  12510,      1
*Nset, nset=_PickedSet377, internal
   264,   265,   649,   650,   720,   730
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*Elset, elset=_PickedSet377, internal, generate
 12253,  12312,      1
*Nset, nset=_PickedSet378, internal
   272,   273,   350,   351,   648,   649
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*Elset, elset=_PickedSet378, internal, generate
 11125,  11212,      1
*Nset, nset=_PickedSet379, internal
   651,   652,   658,   659,   660,   661
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*Elset, elset=_PickedSet379, internal, generate
 11213,  11318,      1
*Nset, nset=_PickedSet380, internal
   227,   228,   232,   233,   234,   330
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*Elset, elset=_PickedSet380, internal, generate
 4119,  4176,     1
*Nset, nset=_PickedSet381, internal
   227,   232,   330,   335,   720,   721
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*Elset, elset=_PickedSet381, internal, generate
 12313,  12412,      1
*Nset, nset=_PickedSet382, internal
   226,   227,   228,   330,   331,   332
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*Elset, elset=_PickedSet382, internal, generate
 4081,  4118,     1
*Nset, nset=_PickedSet383, internal
   226,   227,   330,   331,   439,   446
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*Elset, elset=_PickedSet383, internal, generate
 12511,  12552,      1
*Nset, nset=_PickedSet384, internal
   435,   436,   442,   444,   722,   723
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*Elset, elset=_PickedSet384, internal, generate
 12413,  12448,      1
*Nset, nset=_PickedSet385, internal
   414,   415,   416,   417,   418,   419
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*Elset, elset=_PickedSet385, internal, generate
 5119,  5188,     1
*Nset, nset=_PickedSet386, internal
   308,   311,   368,   369,   416,   417
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*Elset, elset=_PickedSet386, internal, generate
 5885,  5982,     1
*Nset, nset=_PickedSet387, internal
   224,   225,   328,   329,   472,   473
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*Elset, elset=_PickedSet387, internal, generate
 5983,  6030,     1
*Nset, nset=_PickedSet388, internal
   218,   219,   224,   225,   326,   327
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*Elset, elset=_PickedSet388, internal, generate
 4045,  4080,     1
*Nset, nset=_PickedSet389, internal
   308,   309,   367,   368,   474,   493
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*Elset, elset=_PickedSet389, internal, generate
 11717,  11764,      1
*Nset, nset=_PickedSet390, internal
   308,   309,   310,   311,   367,   368
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*Elset, elset=_PickedSet390, internal, generate
 4863,  4898,     1
*Nset, nset=_PickedSet391, internal
   418,   419,   427,   428,   707,   708
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*Elset, elset=_PickedSet391, internal, generate
 12151,  12174,      1
*Nset, nset=_PickedSet392, internal
   421,   422,   426,   432,   713,   714
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*Elset, elset=_PickedSet392, internal, generate
 12229,  12252,      1
*Nset, nset=_PickedSet393, internal
   211,   212,   218,   219,   324,   325
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*Elset, elset=_PickedSet393, internal, generate
 4009,  4044,     1
*Nset, nset=_PickedSet394, internal
   277,   278,   282,   283,   284,   354
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*Elset, elset=_PickedSet394, internal, generate
 4687,  4748,     1
*Nset, nset=_PickedSet395, internal
   191,   192,   288,   313,   316,   359
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*Elset, elset=_PickedSet395, internal, generate
 4749,  4776,     1
*Nset, nset=_PickedSet396, internal
   651,   658,   678,   706,   707,   708
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*Elset, elset=_PickedSet396, internal, generate
 12045,  12094,      1
*Nset, nset=_PickedSet397, internal
   650,   651,   706,   712,   713,   714
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*Elset, elset=_PickedSet397, internal, generate
 12095,  12150,      1
*Nset, nset=_PickedSet398, internal
   650,   712,   720,   721,   722,   723
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*Elset, elset=_PickedSet398, internal, generate
 12175,  12228,      1
*Nset, nset=_PickedSet399, internal
   309,   310,   367,   370,   658,   678
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*Elset, elset=_PickedSet399, internal, generate
 11651,  11716,      1
*Nset, nset=_PickedSet400, internal
   292,   293,   309,   361,   362,   367
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*Elset, elset=_PickedSet400, internal, generate
 11833,  11880,      1
*Nset, nset=_PickedSet401, internal
   208,   209,   210,   211,   212,   321
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*Elset, elset=_PickedSet401, internal, generate
 3963,  4008,     1
*Nset, nset=_PickedSet402, internal
   204,   205,   208,   209,   319,   320
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*Elset, elset=_PickedSet402, internal, generate
 10913,  10982,      1
*Nset, nset=_PickedSet403, internal
   200,   201,   204,   205,   317,   318
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*Elset, elset=_PickedSet403, internal, generate
 3893,  3962,     1
*Nset, nset=_PickedSet404, internal
   190,   194,   200,   201,   312,   314
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*Elset, elset=_PickedSet404, internal, generate
 3813,  3892,     1
*Nset, nset=_PickedSet405, internal
   209,   290,   321,   363,   645,   668
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*Elset, elset=_PickedSet405, internal, generate
 11881,  11974,      1
*Nset, nset=_PickedSet406, internal
   209,   210,   290,   293,   321,   323
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*Elset, elset=_PickedSet406, internal, generate
 12595,  12626,      1
*Nset, nset=_PickedSet407, internal
   290,   291,   292,   293,   360,   361
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*Elset, elset=_PickedSet407, internal, generate
 4777,  4812,     1
*Nset, nset=_PickedSet408, internal
   299,   300,   365,   366,   658,   659
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*Elset, elset=_PickedSet408, internal, generate
 11975,  12044,      1
*Nset, nset=_PickedSet409, internal
   277,   282,   298,   299,   300,   354
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*Elset, elset=_PickedSet409, internal, generate
 4813,  4862,     1
*Nset, nset=_PickedSet410, internal
   283,   290,   291,   358,   360,   363
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*Elset, elset=_PickedSet410, internal, generate
 11765,  11832,      1
*Nset, nset=_PickedSet411, internal
   192,   193,   315,   316,   668,   672
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*Elset, elset=_PickedSet411, internal, generate
 11547,  11650,      1
*Nset, nset=_PickedSet412, internal
   190,   191,   192,   193,   194,   312
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*Elset, elset=_PickedSet412, internal, generate
 3773,  3812,     1
*Nset, nset=Passive
   372,   373,   384,   385,   396,   404
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*Elset, elset=Passive, generate
 12693,  22011,      1
** Section: Section-1
*Solid Section, elset=_PickedSet317, material=Material-active
,
** Section: Section-1
*Solid Section, elset=_PickedSet316, material=Material-active
,
** Section: Section-2
*Solid Section, elset=_PickedSet315, material=Material-passive
,
** Section: Section-1
*Solid Section, elset=_PickedSet318, material=Material-active
,
** Section: Section-1
*Solid Section, elset=_PickedSet328, material=Material-active
,
** Section: Section-2
*Solid Section, elset=_PickedSet337, material=Material-passive
,
** Section: Section-1
*Solid Section, elset=_PickedSet338, material=Material-active
,
** Section: Section-1
*Solid Section, elset=_PickedSet361, material=Material-active
,
** Section: Section-1
*Solid Section, elset=_PickedSet355, material=Material-active
,
** Section: Section-1
*Solid Section, elset=_PickedSet354, material=Material-active
,
** Section: Section-2
*Solid Section, elset=_PickedSet352, material=Material-passive
,
** Section: Section-1
*Solid Section, elset=_PickedSet351, material=Material-active
,
** Section: Section-2
*Solid Section, elset=_PickedSet350, material=Material-passive
,
** Section: Section-2
*Solid Section, elset=_PickedSet349, material=Material-passive
,
** Section: Section-2
*Solid Section, elset=_PickedSet347, material=Material-passive
,
** Section: Section-2
*Solid Section, elset=_PickedSet340, material=Material-passive
,
** Section: Section-2
*Solid Section, elset=_PickedSet322, material=Material-passive
,
** Section: Section-2
*Solid Section, elset=_PickedSet329, material=Material-passive
,
** Section: Section-1
*Solid Section, elset=_PickedSet321, material=Material-active
,
** Section: Section-1
*Solid Section, elset=_PickedSet324, material=Material-active
,
** Section: Section-2
*Solid Section, elset=_PickedSet308, material=Material-passive
,
** Section: Section-1
*Solid Section, elset=_PickedSet307, material=Material-active
,
** Section: Section-2
*Solid Section, elset=_PickedSet306, material=Material-passive
,
** Section: Section-2
*Solid Section, elset=_PickedSet304, material=Material-passive
,
** Section: Section-2
*Solid Section, elset=_PickedSet279, material=Material-passive
,
** Section: Section-2
*Solid Section, elset=_PickedSet278, material=Material-passive
,
** Section: Section-1
*Solid Section, elset=_PickedSet277, material=Material-active
,
** Section: Section-2
*Solid Section, elset=_PickedSet270, material=Material-passive
,
** Section: Section-1
*Solid Section, elset=_PickedSet286, material=Material-active
,
** Section: Section-2
*Solid Section, elset=_PickedSet291, material=Material-passive
,
** Section: Section-1
*Solid Section, elset=_PickedSet289, material=Material-active
,
** Section: Section-2
*Solid Section, elset=_PickedSet288, material=Material-passive
,
** Section: Section-2
*Solid Section, elset=_PickedSet287, material=Material-passive
,
** Section: Section-1
*Solid Section, elset=_PickedSet292, material=Material-active
,
** Section: Section-1
*Solid Section, elset=_PickedSet297, material=Material-active
,
** Section: Section-1
*Solid Section, elset=_PickedSet275, material=Material-active
,
** Section: Section-1
*Solid Section, elset=_PickedSet314, material=Material-active
,
** Section: Section-2
*Solid Section, elset=_PickedSet298, material=Material-passive
,
** Section: Section-2
*Solid Section, elset=_PickedSet300, material=Material-passive
,
** Section: Section-2
*Solid Section, elset=_PickedSet313, material=Material-passive
,
** Section: Section-2
*Solid Section, elset=_PickedSet311, material=Material-passive
,
** Section: Section-2
*Solid Section, elset=_PickedSet210, material=Material-passive
,
** Section: Section-1
*Solid Section, elset=_PickedSet209, material=Material-active
,
** Section: Section-1
*Solid Section, elset=_PickedSet212, material=Material-active
,
** Section: Section-2
*Solid Section, elset=_PickedSet222, material=Material-passive
,
** Section: Section-2
*Solid Section, elset=_PickedSet223, material=Material-passive
,
** Section: Section-2
*Solid Section, elset=_PickedSet224, material=Material-passive
,
** Section: Section-1
*Solid Section, elset=_PickedSet261, material=Material-active
,
** Section: Section-1
*Solid Section, elset=_PickedSet260, material=Material-active
,
** Section: Section-1
*Solid Section, elset=_PickedSet259, material=Material-active
,
** Section: Section-1
*Solid Section, elset=_PickedSet262, material=Material-active
,
** Section: Section-1
*Solid Section, elset=_PickedSet263, material=Material-active
,
** Section: Section-2
*Solid Section, elset=_PickedSet264, material=Material-passive
,
** Section: Section-1
*Solid Section, elset=_PickedSet253, material=Material-active
,
** Section: Section-1
*Solid Section, elset=_PickedSet252, material=Material-active
,
** Section: Section-2
*Solid Section, elset=_PickedSet251, material=Material-passive
,
** Section: Section-2
*Solid Section, elset=_PickedSet216, material=Material-passive
,
** Section: Section-1
*Solid Section, elset=_PickedSet215, material=Material-active
,
** Section: Section-1
*Solid Section, elset=_PickedSet211, material=Material-active
,
** Section: Section-1
*Solid Section, elset=_PickedSet234, material=Material-active
,
** Section: Section-2
*Solid Section, elset=_PickedSet218, material=Material-passive
,
** Section: Section-2
*Solid Section, elset=_PickedSet241, material=Material-passive
,
** Section: Section-1
*Solid Section, elset=_PickedSet412, material=Material-active
,
** Section: Section-2
*Solid Section, elset=_PickedSet404, material=Material-passive
,
** Section: Section-1
*Solid Section, elset=_PickedSet403, material=Material-active
,
** Section: Section-1
*Solid Section, elset=_PickedSet401, material=Material-active
,
** Section: Section-1
*Solid Section, elset=_PickedSet393, material=Material-active
,
** Section: Section-1
*Solid Section, elset=_PickedSet388, material=Material-active
,
** Section: Section-1
*Solid Section, elset=_PickedSet382, material=Material-active
,
** Section: Section-1
*Solid Section, elset=_PickedSet380, material=Material-active
,
** Section: Section-1
*Solid Section, elset=_PickedSet369, material=Material-active
,
** Section: Section-1
*Solid Section, elset=_PickedSet368, material=Material-active
,
** Section: Section-1
*Solid Section, elset=_PickedSet365, material=Material-active
,
** Section: Section-1
*Solid Section, elset=_PickedSet366, material=Material-active
,
** Section: Section-2
*Solid Section, elset=_PickedSet375, material=Material-passive
,
** Section: Section-1
*Solid Section, elset=_PickedSet373, material=Material-active
,
** Section: Section-1
*Solid Section, elset=_PickedSet371, material=Material-active
,
** Section: Section-2
*Solid Section, elset=_PickedSet394, material=Material-passive
,
** Section: Section-1
*Solid Section, elset=_PickedSet395, material=Material-active
,
** Section: Section-2
*Solid Section, elset=_PickedSet407, material=Material-passive
,
** Section: Section-2
*Solid Section, elset=_PickedSet409, material=Material-passive
,
** Section: Section-2
*Solid Section, elset=_PickedSet390, material=Material-passive
,
** Section: Section-1
*Solid Section, elset=_PickedSet269, material=Material-active
,
** Section: Section-2
*Solid Section, elset=_PickedSet268, material=Material-passive
,
** Section: Section-2
*Solid Section, elset=_PickedSet363, material=Material-passive
,
** Section: Section-2
*Solid Section, elset=_PickedSet385, material=Material-passive
,
** Section: Section-2
*Solid Section, elset=_PickedSet364, material=Material-passive
,
** Section: Section-2
*Solid Section, elset=_PickedSet246, material=Material-passive
,
** Section: Section-1
*Solid Section, elset=_PickedSet344, material=Material-active
,
** Section: Section-1
*Solid Section, elset=_PickedSet334, material=Material-active
,
** Section: Section-2
*Solid Section, elset=_PickedSet240, material=Material-passive
,
** Section: Section-1
*Solid Section, elset=_PickedSet245, material=Material-active
,
** Section: Section-1
*Solid Section, elset=_PickedSet267, material=Material-active
,
** Section: Section-2
*Solid Section, elset=_PickedSet266, material=Material-passive
,
** Section: Section-1
*Solid Section, elset=_PickedSet335, material=Material-active
,
** Section: Section-1
*Solid Section, elset=_PickedSet386, material=Material-active
,
** Section: Section-2
*Solid Section, elset=_PickedSet387, material=Material-passive
,
** Section: Section-1
*Solid Section, elset=_PickedSet359, material=Material-active
,
** Section: Section-2
*Solid Section, elset=_PickedSet346, material=Material-passive
,
** Section: Section-1
*Solid Section, elset=_PickedSet362, material=Material-active
,
** Section: Section-2
*Solid Section, elset=_PickedSet360, material=Material-passive
,
** Section: Section-1
*Solid Section, elset=_PickedSet271, material=Material-active
,
** Section: Section-2
*Solid Section, elset=_PickedSet358, material=Material-passive
,
** Section: Section-2
*Solid Section, elset=_PickedSet356, material=Material-passive
,
** Section: Section-1
*Solid Section, elset=_PickedSet357, material=Material-active
,
** Section: Section-2
*Solid Section, elset=_PickedSet333, material=Material-passive
,
** Section: Section-2
*Solid Section, elset=_PickedSet343, material=Material-passive
,
** Section: Section-1
*Solid Section, elset=_PickedSet319, material=Material-active
,
** Section: Section-2
*Solid Section, elset=_PickedSet327, material=Material-passive
,
** Section: Section-1
*Solid Section, elset=_PickedSet353, material=Material-active
,
** Section: Section-1
*Solid Section, elset=_PickedSet348, material=Material-active
,
** Section: Section-1
*Solid Section, elset=_PickedSet345, material=Material-active
,
** Section: Section-2
*Solid Section, elset=_PickedSet342, material=Material-passive
,
** Section: Section-1
*Solid Section, elset=_PickedSet339, material=Material-active
,
** Section: Section-1
*Solid Section, elset=_PickedSet326, material=Material-active
,
** Section: Section-2
*Solid Section, elset=_PickedSet320, material=Material-passive
,
** Section: Section-1
*Solid Section, elset=_PickedSet323, material=Material-active
,
** Section: Section-1
*Solid Section, elset=_PickedSet332, material=Material-active
,
** Section: Section-1
*Solid Section, elset=_PickedSet341, material=Material-active
,
** Section: Section-1
*Solid Section, elset=_PickedSet336, material=Material-active
,
** Section: Section-2
*Solid Section, elset=_PickedSet280, material=Material-passive
,
** Section: Section-2
*Solid Section, elset=_PickedSet325, material=Material-passive
,
** Section: Section-1
*Solid Section, elset=_PickedSet331, material=Material-active
,
** Section: Section-2
*Solid Section, elset=_PickedSet284, material=Material-passive
,
** Section: Section-2
*Solid Section, elset=_PickedSet274, material=Material-passive
,
** Section: Section-1
*Solid Section, elset=_PickedSet272, material=Material-active
,
** Section: Section-1
*Solid Section, elset=_PickedSet285, material=Material-active
,
** Section: Section-2
*Solid Section, elset=_PickedSet293, material=Material-passive
,
** Section: Section-1
*Solid Section, elset=_PickedSet294, material=Material-active
,
** Section: Section-1
*Solid Section, elset=_PickedSet283, material=Material-active
,
** Section: Section-2
*Solid Section, elset=_PickedSet273, material=Material-passive
,
** Section: Section-2
*Solid Section, elset=_PickedSet305, material=Material-passive
,
** Section: Section-2
*Solid Section, elset=_PickedSet302, material=Material-passive
,
** Section: Section-1
*Solid Section, elset=_PickedSet290, material=Material-active
,
** Section: Section-2
*Solid Section, elset=_PickedSet295, material=Material-passive
,
** Section: Section-2
*Solid Section, elset=_PickedSet296, material=Material-passive
,
** Section: Section-2
*Solid Section, elset=_PickedSet282, material=Material-passive
,
** Section: Section-2
*Solid Section, elset=_PickedSet276, material=Material-passive
,
** Section: Section-1
*Solid Section, elset=_PickedSet303, material=Material-active
,
** Section: Section-2
*Solid Section, elset=_PickedSet309, material=Material-passive
,
** Section: Section-1
*Solid Section, elset=_PickedSet312, material=Material-active
,
** Section: Section-1
*Solid Section, elset=_PickedSet281, material=Material-active
,
** Section: Section-2
*Solid Section, elset=_PickedSet310, material=Material-passive
,
** Section: Section-1
*Solid Section, elset=_PickedSet299, material=Material-active
,
** Section: Section-1
*Solid Section, elset=_PickedSet330, material=Material-active
,
** Section: Section-1
*Solid Section, elset=_PickedSet221, material=Material-active
,
** Section: Section-1
*Solid Section, elset=_PickedSet239, material=Material-active
,
** Section: Section-1
*Solid Section, elset=_PickedSet265, material=Material-active
,
** Section: Section-1
*Solid Section, elset=_PickedSet250, material=Material-active
,
** Section: Section-2
*Solid Section, elset=_PickedSet236, material=Material-passive
,
** Section: Section-1
*Solid Section, elset=_PickedSet217, material=Material-active
,
** Section: Section-2
*Solid Section, elset=_PickedSet214, material=Material-passive
,
** Section: Section-2
*Solid Section, elset=_PickedSet213, material=Material-passive
,
** Section: Section-1
*Solid Section, elset=_PickedSet242, material=Material-active
,
** Section: Section-2
*Solid Section, elset=_PickedSet238, material=Material-passive
,
** Section: Section-1
*Solid Section, elset=_PickedSet219, material=Material-active
,
** Section: Section-1
*Solid Section, elset=_PickedSet237, material=Material-active
,
** Section: Section-1
*Solid Section, elset=_PickedSet220, material=Material-active
,
** Section: Section-1
*Solid Section, elset=_PickedSet235, material=Material-active
,
** Section: Section-1
*Solid Section, elset=_PickedSet243, material=Material-active
,
** Section: Section-1
*Solid Section, elset=_PickedSet249, material=Material-active
,
** Section: Section-2
*Solid Section, elset=_PickedSet244, material=Material-passive
,
** Section: Section-1
*Solid Section, elset=_PickedSet255, material=Material-active
,
** Section: Section-1
*Solid Section, elset=_PickedSet247, material=Material-active
,
** Section: Section-2
*Solid Section, elset=_PickedSet254, material=Material-passive
,
** Section: Section-2
*Solid Section, elset=_PickedSet256, material=Material-passive
,
** Section: Section-2
*Solid Section, elset=_PickedSet248, material=Material-passive
,
** Section: Section-1
*Solid Section, elset=_PickedSet258, material=Material-active
,
** Section: Section-1
*Solid Section, elset=_PickedSet402, material=Material-active
,
** Section: Section-2
*Solid Section, elset=_PickedSet367, material=Material-passive
,
** Section: Section-1
*Solid Section, elset=_PickedSet374, material=Material-active
,
** Section: Section-1
*Solid Section, elset=_PickedSet378, material=Material-active
,
** Section: Section-2
*Solid Section, elset=_PickedSet379, material=Material-passive
,
** Section: Section-1
*Solid Section, elset=_PickedSet372, material=Material-active
,
** Section: Section-2
*Solid Section, elset=_PickedSet370, material=Material-passive
,
** Section: Section-2
*Solid Section, elset=_PickedSet411, material=Material-passive
,
** Section: Section-2
*Solid Section, elset=_PickedSet399, material=Material-passive
,
** Section: Section-1
*Solid Section, elset=_PickedSet389, material=Material-active
,
** Section: Section-1
*Solid Section, elset=_PickedSet410, material=Material-active
,
** Section: Section-1
*Solid Section, elset=_PickedSet400, material=Material-active
,
** Section: Section-2
*Solid Section, elset=_PickedSet405, material=Material-passive
,
** Section: Section-1
*Solid Section, elset=_PickedSet408, material=Material-active
,
** Section: Section-2
*Solid Section, elset=_PickedSet396, material=Material-passive
,
** Section: Section-1
*Solid Section, elset=_PickedSet397, material=Material-active
,
** Section: Section-1
*Solid Section, elset=_PickedSet391, material=Material-active
,
** Section: Section-2
*Solid Section, elset=_PickedSet398, material=Material-passive
,
** Section: Section-2
*Solid Section, elset=_PickedSet392, material=Material-passive
,
** Section: Section-2
*Solid Section, elset=_PickedSet377, material=Material-passive
,
** Section: Section-2
*Solid Section, elset=_PickedSet381, material=Material-passive
,
** Section: Section-1
*Solid Section, elset=_PickedSet384, material=Material-active
,
** Section: Section-1
*Solid Section, elset=_PickedSet376, material=Material-active
,
** Section: Section-2
*Solid Section, elset=_PickedSet383, material=Material-passive
,
** Section: Section-2
*Solid Section, elset=_PickedSet257, material=Material-passive
,
** Section: Section-1
*Solid Section, elset=_PickedSet406, material=Material-active
,
** Section: Section-2
*Solid Section, elset=_PickedSet233, material=Material-passive
,
** Section: Section-2
*Solid Section, elset=_PickedSet301, material=Material-passive
,
** Section: Section-2
*Solid Section, elset=Passive, material=Material-passive
,
*End Part
**
**
** ASSEMBLY
**
*Assembly, name=Assembly
**
*Instance, name=butterfly-1, part=butterfly
*End Instance
**
*Nset, nset=Set-2, instance=butterfly-1
   373,   384,   385,   404,   410,   411
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*Elset, elset=Set-2, instance=butterfly-1
 13055, 13375, 13397, 13494, 13631, 13679
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*Nset, nset=_PickedSet80, internal, instance=butterfly-1, generate
     1,  32865,      1
*Elset, elset=_PickedSet80, internal, instance=butterfly-1, generate
     1,  22011,      1
*Elset, elset=__T0_butterfly-1_M_S3, internal, instance=butterfly-1
 4907, 4946
*Surface, type=ELEMENT, name=_T0_butterfly-1_M, internal
__T0_butterfly-1_M_S3, S3
*Nset, nset=_T0_butterfly-1_SN, instance=butterfly-1
 25154, 27381, 27428, 29389, 29469, 29471, 31031, 31950, 32713
*Surface, type=NODE, name=_T0_butterfly-1_SN, internal
_T0_butterfly-1_SN
*Tie, name=_T0_butterfly-1-Nodes, adjust=no
_T0_butterfly-1_SN, _T0_butterfly-1_M
*Elset, elset=__T1_butterfly-1_M_S3, internal, instance=butterfly-1
 4982, 5014
*Elset, elset=__T1_butterfly-1_M_S5, internal, instance=butterfly-1
 4990, 4999, 5022, 5031
*Surface, type=ELEMENT, name=_T1_butterfly-1_M, internal
__T1_butterfly-1_M_S3, S3
__T1_butterfly-1_M_S5, S5
*Nset, nset=_T1_butterfly-1_SN, instance=butterfly-1
  9411,  9412, 24983, 24985, 24987, 26676
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*Surface, type=NODE, name=_T1_butterfly-1_SN, internal
_T1_butterfly-1_SN
*Tie, name=_T1_butterfly-1-Nodes, adjust=no
_T1_butterfly-1_SN, _T1_butterfly-1_M
*Elset, elset=__T2_butterfly-1_M_S6, internal, instance=butterfly-1
 5049, 5088
*Surface, type=ELEMENT, name=_T2_butterfly-1_M, internal
__T2_butterfly-1_M_S6, S6
*Nset, nset=_T2_butterfly-1_SN, instance=butterfly-1
 25154, 25156, 25158, 27397, 27402, 27414, 27430, 31246, 32664
*Surface, type=NODE, name=_T2_butterfly-1_SN, internal
_T2_butterfly-1_SN
*Tie, name=_T2_butterfly-1-Nodes, adjust=no
_T2_butterfly-1_SN, _T2_butterfly-1_M
*Elset, elset=__T3_butterfly-1_M_S4, internal, instance=butterfly-1
 5126, 5127, 5161, 5162
*Elset, elset=__T3_butterfly-1_M_S6, internal, instance=butterfly-1
 5128, 5163
*Surface, type=ELEMENT, name=_T3_butterfly-1_M, internal
__T3_butterfly-1_M_S4, S4
__T3_butterfly-1_M_S6, S6
*Nset, nset=_T3_butterfly-1_SN, instance=butterfly-1
  9513,  9514, 21641, 21643, 21645, 23436
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*Surface, type=NODE, name=_T3_butterfly-1_SN, internal
_T3_butterfly-1_SN
*Tie, name=_T3_butterfly-1-Nodes, adjust=no
_T3_butterfly-1_SN, _T3_butterfly-1_M
*Elset, elset=__T4_butterfly-1_M_S6, internal, instance=butterfly-1
 5189, 5228
*Surface, type=ELEMENT, name=_T4_butterfly-1_M, internal
__T4_butterfly-1_M_S6, S6
*Nset, nset=_T4_butterfly-1_SN, instance=butterfly-1
 23438, 25129, 27408, 27439, 27440, 30012, 30014, 30301, 30511
*Surface, type=NODE, name=_T4_butterfly-1_SN, internal
_T4_butterfly-1_SN
*Tie, name=_T4_butterfly-1-Nodes, adjust=no
_T4_butterfly-1_SN, _T4_butterfly-1_M
*Elset, elset=__T5_butterfly-1_M_S5, internal, instance=butterfly-1
 5274, 5275, 5309, 5310
*Elset, elset=__T5_butterfly-1_M_S3, internal, instance=butterfly-1
 5276, 5311
*Surface, type=ELEMENT, name=_T5_butterfly-1_M, internal
__T5_butterfly-1_M_S5, S5
__T5_butterfly-1_M_S3, S3
*Nset, nset=_T5_butterfly-1_SN, instance=butterfly-1
  9620,  9621, 21643, 23436, 24219, 24221
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*Surface, type=NODE, name=_T5_butterfly-1_SN, internal
_T5_butterfly-1_SN
*Tie, name=_T5_butterfly-1-Nodes, adjust=no
_T5_butterfly-1_SN, _T5_butterfly-1_M
*Elset, elset=__T6_butterfly-1_M_S6, internal, instance=butterfly-1
 5342, 5374
*Elset, elset=__T6_butterfly-1_M_S4, internal, instance=butterfly-1
 5350, 5359, 5382, 5391
*Surface, type=ELEMENT, name=_T6_butterfly-1_M, internal
__T6_butterfly-1_M_S6, S6
__T6_butterfly-1_M_S4, S4
*Nset, nset=_T6_butterfly-1_SN, instance=butterfly-1
  9662,  9663, 24850, 25156, 25262, 25264
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*Surface, type=NODE, name=_T6_butterfly-1_SN, internal
_T6_butterfly-1_SN
*Tie, name=_T6_butterfly-1-Nodes, adjust=no
_T6_butterfly-1_SN, _T6_butterfly-1_M
*Elset, elset=__T7_butterfly-1_M_S6, internal, instance=butterfly-1, generate
 5401,  5492,     7
*Surface, type=ELEMENT, name=_T7_butterfly-1_M, internal
__T7_butterfly-1_M_S6, S6
*Nset, nset=_T7_butterfly-1_SN, instance=butterfly-1
  9738,  9739,  9740,  9741,  9742,  9743
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*Surface, type=NODE, name=_T7_butterfly-1_SN, internal
_T7_butterfly-1_SN
*Tie, name=_T7_butterfly-1-Nodes, adjust=no
_T7_butterfly-1_SN, _T7_butterfly-1_M
*Elset, elset=__T8_butterfly-1_M_S3, internal, instance=butterfly-1
 5499, 5500, 5501, 5502, 5503, 5504, 5505, 5548, 5549, 5550, 5551, 5552, 5553, 5554
*Surface, type=ELEMENT, name=_T8_butterfly-1_M, internal
__T8_butterfly-1_M_S3, S3
*Nset, nset=_T8_butterfly-1_SN, instance=butterfly-1
  9830,  9831,  9832,  9833,  9834,  9835
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*Surface, type=NODE, name=_T8_butterfly-1_SN, internal
_T8_butterfly-1_SN
*Tie, name=_T8_butterfly-1-Nodes, adjust=no
_T8_butterfly-1_SN, _T8_butterfly-1_M
*Elset, elset=__T9_butterfly-1_M_S3, internal, instance=butterfly-1
 5597, 5636
*Surface, type=ELEMENT, name=_T9_butterfly-1_M, internal
__T9_butterfly-1_M_S3, S3
*Nset, nset=_T9_butterfly-1_SN, instance=butterfly-1
 29454, 29672, 29825, 29826, 29828, 30163, 30299, 30300, 30301
*Surface, type=NODE, name=_T9_butterfly-1_SN, internal
_T9_butterfly-1_SN
*Tie, name=_T9_butterfly-1-Nodes, adjust=no
_T9_butterfly-1_SN, _T9_butterfly-1_M
*Elset, elset=__T10_butterfly-1_M_S3, internal, instance=butterfly-1, generate
 5675,  5766,     7
*Surface, type=ELEMENT, name=_T10_butterfly-1_M, internal
__T10_butterfly-1_M_S3, S3
*Nset, nset=_T10_butterfly-1_SN, instance=butterfly-1
  9922,  9923,  9924,  9925,  9926,  9927
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*Surface, type=NODE, name=_T10_butterfly-1_SN, internal
_T10_butterfly-1_SN
*Tie, name=_T10_butterfly-1-Nodes, adjust=no
_T10_butterfly-1_SN, _T10_butterfly-1_M
*Elset, elset=__T11_butterfly-1_M_S6, internal, instance=butterfly-1, generate
 5773,  5822,     7
*Surface, type=ELEMENT, name=_T11_butterfly-1_M, internal
__T11_butterfly-1_M_S6, S6
*Nset, nset=_T11_butterfly-1_SN, instance=butterfly-1
 10005, 10006, 10007, 24684, 24686, 24688
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*Surface, type=NODE, name=_T11_butterfly-1_SN, internal
_T11_butterfly-1_SN
*Tie, name=_T11_butterfly-1-Nodes, adjust=no
_T11_butterfly-1_SN, _T11_butterfly-1_M
*Elset, elset=__T12_butterfly-1_M_S3, internal, instance=butterfly-1, generate
 5829,  5878,     7
*Surface, type=ELEMENT, name=_T12_butterfly-1_M, internal
__T12_butterfly-1_M_S3, S3
*Nset, nset=_T12_butterfly-1_SN, instance=butterfly-1
 10029, 10030, 10031, 20747, 22425, 24688
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*Surface, type=NODE, name=_T12_butterfly-1_SN, internal
_T12_butterfly-1_SN
*Tie, name=_T12_butterfly-1-Nodes, adjust=no
_T12_butterfly-1_SN, _T12_butterfly-1_M
*Elset, elset=__T13_butterfly-1_M_S6, internal, instance=butterfly-1
 5885, 5886, 5887, 5888, 5889, 5890, 5891, 5934, 5935, 5936, 5937, 5938, 5939, 5940
*Surface, type=ELEMENT, name=_T13_butterfly-1_M, internal
__T13_butterfly-1_M_S6, S6
*Nset, nset=_T13_butterfly-1_SN, instance=butterfly-1
 10070, 10071, 10072, 10073, 10074, 10075
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*Surface, type=NODE, name=_T13_butterfly-1_SN, internal
_T13_butterfly-1_SN
*Tie, name=_T13_butterfly-1-Nodes, adjust=no
_T13_butterfly-1_SN, _T13_butterfly-1_M
*Elset, elset=__T14_butterfly-1_M_S5, internal, instance=butterfly-1
 5983, 5984, 5985, 6007, 6008, 6009
*Surface, type=ELEMENT, name=_T14_butterfly-1_M, internal
__T14_butterfly-1_M_S5, S5
*Nset, nset=_T14_butterfly-1_SN, instance=butterfly-1
 10134, 10135, 20884, 24913, 24937, 25006
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*Surface, type=NODE, name=_T14_butterfly-1_SN, internal
_T14_butterfly-1_SN
*Tie, name=_T14_butterfly-1-Nodes, adjust=no
_T14_butterfly-1_SN, _T14_butterfly-1_M
*Elset, elset=__T15_butterfly-1_M_S4, internal, instance=butterfly-1
 9441, 9442, 9443, 9465, 9466, 9467
*Surface, type=ELEMENT, name=_T15_butterfly-1_M, internal
__T15_butterfly-1_M_S4, S4
*Nset, nset=_T15_butterfly-1_SN, instance=butterfly-1
 12472, 12473, 25023, 25580, 25582, 26350
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*Surface, type=NODE, name=_T15_butterfly-1_SN, internal
_T15_butterfly-1_SN
*Tie, name=_T15_butterfly-1-Nodes, adjust=no
_T15_butterfly-1_SN, _T15_butterfly-1_M
*End Assembly
**
** MATERIALS
**
*Material, name=Material-active
*Density
 1e-06,
*Expansion
 0.001,
*Hyperelastic, neo hooke
 0.1, 0.002
*Material, name=Material-passive
*Density
 1e-06,
*Expansion
0.,
*Hyperelastic, neo hooke
 0.1, 0.002
**
** BOUNDARY CONDITIONS
**
** Name: BC-2 Type: 位移/转角
*Boundary
Set-2, 1, 1
Set-2, 2, 2
Set-2, 3, 3
**
** PREDEFINED FIELDS
**
** Name: Predefined Field-1   Type: Temperature
*Initial Conditions, type=TEMPERATURE
_PickedSet80, 25.
** ----------------------------------------------------------------
**
** STEP: Step-1
**
*Step, name=Step-1, nlgeom=YES, inc=10000
*Static
1e-05, 6., 1e-05, 0.1
**
** PREDEFINED FIELDS
**
** Name: Predefined Field-1   Type: Temperature
*Temperature
_PickedSet80, 85.
**
** OUTPUT REQUESTS
**
*Restart, write, frequency=0
**
** FIELD OUTPUT: F-Output-1
**
*Output, field, variable=PRESELECT, number interval=60
**
** HISTORY OUTPUT: H-Output-1
**
*Output, history, variable=PRESELECT
*End Step
